<?xml version="1.0" encoding="UTF-8"?>
<neuroml xmlns="http://morphml.org/neuroml/schema" xmlns:meta="http://morphml.org/metadata/schema" xmlns:xsi="http://www.w3.org/2001/XMLSchema-instance" xmlns:mml="http://morphml.org/morphml/schema" xmlns:cml="http://morphml.org/channelml/schema" xmlns:bio="http://morphml.org/biophysics/schema" xmlns:net="http://morphml.org/networkml/schema" xsi:schemaLocation="http://morphml.org/neuroml/schema http://www.neuroml.org/NeuroMLValidator/NeuroMLFiles/Schemata/v1.8.1/Level3/NeuroML_Level3_v1.8.1.xsd" lengthUnits="micrometer">

<meta:notes>

Complete network structure generated with project: Cerebellum saved with neuroConstruct v1.4.1 on: 13:54:41, 14-Sep-10

Cell Group: MF_3D contains 150 cells
Cell Group: Purkinjes contains 4 cells
Cell Group: Golgis_detailed contains 4 cells
Cell Group: GrC_3D contains 100 cells

Network connection: NetConn_GrC_3D_Golgis_detailed contains 80 individual synaptic connections
Network connection: NetConn_GrC_3D_Purkinjes contains 80 individual synaptic connections
Network connection: NetConnMFGrC contains 412 individual synaptic connections
Network connection: NetConn_Purkinjes_Grans contains 4 individual synaptic connections

</meta:notes>

<meta:properties>
    <meta:property>
        <meta:tag>neuroConstruct_random_seed</meta:tag>
        <meta:value>-1896425518</meta:value>
    </meta:property>
    <meta:property>
        <meta:tag>neuroConstruct_sim_config</meta:tag>
        <meta:value>Default Simulation Configuration</meta:value>
    </meta:property>
    <meta:property>
        <meta:tag>neuroConstruct_sim_duration</meta:tag>
        <meta:value>700.0</meta:value>
    </meta:property>
    <meta:property>
        <meta:tag>neuroConstruct_sim_time_step</meta:tag>
        <meta:value>0.01</meta:value>
    </meta:property>
    <meta:property>
        <meta:tag>neuroConstruct_temperature</meta:tag>
        <meta:value>37.0</meta:value>
    </meta:property>
</meta:properties>

<cells>
    <cell name="MossyFiberBig">
        <meta:notes>A Simple cell for testing purposes</meta:notes>
        <mml:segments>
            <mml:segment id="0" name="Soma" cable="0">
                <mml:proximal x="0.0" y="0.0" z="0.0" diameter="16.0"/>
                <mml:distal x="0.0" y="0.0" z="0.0" diameter="16.0"/>
            </mml:segment>
        </mml:segments>
        <mml:cables>
            <mml:cable id="0" name="Soma">
                <meta:group>all</meta:group>
                <meta:group>soma_group</meta:group>
            </mml:cable>
        </mml:cables>
        <!--Adding the biophysical parameters-->
        <biophysics units="Physiological Units">
            <bio:mechanism name="MFFastLeakCond" type="Channel Mechanism" passive_conductance="true">
                <bio:parameter name="e" value="-60.0">
                    <bio:group>all</bio:group>
                </bio:parameter>
                <bio:parameter name="gmax" value="15.0">
                    <bio:group>all</bio:group>
                </bio:parameter>
            </bio:mechanism>
            <bio:spec_capacitance>
                <bio:parameter value="1.0">
                    <bio:group>all</bio:group>
                </bio:parameter>
            </bio:spec_capacitance>
            <bio:spec_axial_resistance>
                <bio:parameter value="0.1">
                    <bio:group>all</bio:group>
                </bio:parameter>
            </bio:spec_axial_resistance>
            <bio:init_memb_potential>
                <bio:parameter value="-65.0">
                    <bio:group>all</bio:group>
                </bio:parameter>
            </bio:init_memb_potential>
        </biophysics>
        <connectivity>
            <net:potential_syn_loc synapse_type="NMDA">
                <net:group>all</net:group>
            </net:potential_syn_loc>
            <net:potential_syn_loc synapse_type="MF_AMPA">
                <net:group>all</net:group>
            </net:potential_syn_loc>
        </connectivity>
    </cell>
    <cell name="purk2">
        <meta:notes>Cell: soma exported from NEURON ModelView</meta:notes>
        <mml:segments>
            <mml:segment id="0" name="Seg0_soma" cable="0">
                <mml:proximal x="0.0" y="0.0" z="0.0" diameter="29.8"/>
                <mml:distal x="0.0" y="0.0" z="0.0" diameter="29.8"/>
            </mml:segment>
            <mml:segment id="1" name="Seg0_dend_0" parent="0" cable="1">
                <mml:proximal x="0.0" y="0.0" z="0.0" diameter="7.72"/>
                <mml:distal x="5.557" y="9.447" z="-9.4470005" diameter="7.72"/>
            </mml:segment>
            <mml:segment id="2" name="Seg0_dend_1" parent="1" cable="2">
                <mml:proximal x="5.557" y="9.447" z="-9.4470005" diameter="8.22"/>
                <mml:distal x="13.983" y="31.356" z="-10.571003" diameter="8.22"/>
            </mml:segment>
            <mml:segment id="70" name="Seg0_dend_69" parent="2" cable="3">
                <mml:proximal x="13.983" y="31.356" z="-10.571003" diameter="5.28"/>
                <mml:distal x="20.093" y="30.801" z="-11.126003" diameter="5.28"/>
            </mml:segment>
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        </mml:segments>
        <mml:cables>
            <mml:cable id="0" name="soma">
                <meta:group>all</meta:group>
                <meta:group>soma_group</meta:group>
                <meta:group>ModelViewParmSubset_1</meta:group>
                <meta:group>ModelViewParmSubset_3</meta:group>
                <meta:group>ModelViewParmSubset_4</meta:group>
                <meta:group>OneSecGrp_SectionRef_1</meta:group>
            </mml:cable>
            <mml:cable id="1" name="dend_0" fract_along_parent="0.5">
                <meta:group>all</meta:group>
                <meta:group>dendrite_group</meta:group>
                <meta:group>ModelViewParmSubset_2</meta:group>
                <meta:group>ModelViewParmSubset_3</meta:group>
                <meta:group>ModelViewParmSubset_4</meta:group>
                <meta:group>ModelViewParmSubset_85</meta:group>
                <meta:group>ModelViewParmSubset_87</meta:group>
                <meta:group>OneSecGrp_SectionRef_2</meta:group>
            </mml:cable>
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        </mml:cables>
        <!--Adding the biophysical parameters-->
        <biophysics units="Physiological Units">
            <bio:mechanism name="Leak" type="Channel Mechanism" passive_conductance="true">
                <bio:parameter name="gmax" value="0.198606">
                    <bio:group>ModelViewParmSubset_41</bio:group>
                </bio:parameter>
            </bio:mechanism>
            <bio:mechanism name="Leak" type="Channel Mechanism" passive_conductance="true">
                <bio:parameter name="gmax" value="0.228496">
                    <bio:group>ModelViewParmSubset_44</bio:group>
                </bio:parameter>
            </bio:mechanism>
            <bio:mechanism name="Leak" type="Channel Mechanism" passive_conductance="true">
                <bio:parameter name="gmax" value="0.108519">
                    <bio:group>ModelViewParmSubset_17</bio:group>
                </bio:parameter>
            </bio:mechanism>
            <bio:mechanism name="Leak" type="Channel Mechanism" passive_conductance="true">
                <bio:parameter name="gmax" value="0.150931">
                    <bio:group>ModelViewParmSubset_33</bio:group>
                </bio:parameter>
            </bio:mechanism>
            <bio:mechanism name="Leak" type="Channel Mechanism" passive_conductance="true">
                <bio:parameter name="gmax" value="0.155635">
                    <bio:group>ModelViewParmSubset_34</bio:group>
                </bio:parameter>
            </bio:mechanism>
            <bio:mechanism name="Leak" type="Channel Mechanism" passive_conductance="true">
                <bio:parameter name="gmax" value="0.0923213">
                    <bio:group>ModelViewParmSubset_5</bio:group>
                </bio:parameter>
            </bio:mechanism>
            <bio:mechanism name="Leak" type="Channel Mechanism" passive_conductance="true">
                <bio:parameter name="gmax" value="0.160731">
                    <bio:group>ModelViewParmSubset_35</bio:group>
                </bio:parameter>
            </bio:mechanism>
            <bio:mechanism name="KA" type="Channel Mechanism">
                <bio:parameter name="gmax" value="15.0">
                    <bio:group>OneSecGrp_SectionRef_1</bio:group>
                </bio:parameter>
            </bio:mechanism>
            <bio:mechanism name="Leak" type="Channel Mechanism" passive_conductance="true">
                <bio:parameter name="gmax" value="0.120278">
                    <bio:group>ModelViewParmSubset_23</bio:group>
                </bio:parameter>
            </bio:mechanism>
            <bio:mechanism name="K2" type="Channel Mechanism">
                <bio:parameter name="gmax" value="0.39">
                    <bio:group>ModelViewParmSubset_2</bio:group>
                </bio:parameter>
            </bio:mechanism>
            <bio:mechanism name="Leak" type="Channel Mechanism" passive_conductance="true">
                <bio:parameter name="gmax" value="0.268529">
                    <bio:group>ModelViewParmSubset_47</bio:group>
                </bio:parameter>
            </bio:mechanism>
            <bio:mechanism name="Leak" type="Channel Mechanism" passive_conductance="true">
                <bio:parameter name="gmax" value="0.100779">
                    <bio:group>ModelViewParmSubset_12</bio:group>
                </bio:parameter>
            </bio:mechanism>
            <bio:mechanism name="Leak" type="Channel Mechanism" passive_conductance="true">
                <bio:parameter name="gmax" value="0.0333333">
                    <bio:group>ModelViewParmSubset_87</bio:group>
                </bio:parameter>
            </bio:mechanism>
            <bio:mechanism name="Leak" type="Channel Mechanism" passive_conductance="true">
                <bio:parameter name="gmax" value="0.127897">
                    <bio:group>ModelViewParmSubset_26</bio:group>
                </bio:parameter>
            </bio:mechanism>
            <bio:mechanism name="Leak" type="Channel Mechanism" passive_conductance="true">
                <bio:parameter name="gmax" value="0.0944842">
                    <bio:group>ModelViewParmSubset_7</bio:group>
                </bio:parameter>
            </bio:mechanism>
            <bio:mechanism name="Leak" type="Channel Mechanism" passive_conductance="true">
                <bio:parameter name="gmax" value="0.133581">
                    <bio:group>ModelViewParmSubset_28</bio:group>
                </bio:parameter>
            </bio:mechanism>
            <bio:mechanism name="CaP" type="Channel Mechanism">
                <bio:parameter name="gmax" value="4.5">
                    <bio:group>ModelViewParmSubset_2</bio:group>
                </bio:parameter>
            </bio:mechanism>
            <bio:mechanism name="Leak" type="Channel Mechanism" passive_conductance="true">
                <bio:parameter name="gmax" value="0.113795">
                    <bio:group>ModelViewParmSubset_20</bio:group>
                </bio:parameter>
            </bio:mechanism>
            <bio:mechanism name="Leak" type="Channel Mechanism" passive_conductance="true">
                <bio:parameter name="gmax" value="0.112068">
                    <bio:group>ModelViewParmSubset_19</bio:group>
                </bio:parameter>
            </bio:mechanism>
            <bio:mechanism name="NaF" type="Channel Mechanism">
                <bio:parameter name="gmax" value="7500.0">
                    <bio:group>OneSecGrp_SectionRef_1</bio:group>
                </bio:parameter>
            </bio:mechanism>
            <bio:mechanism name="Leak" type="Channel Mechanism" passive_conductance="true">
                <bio:parameter name="gmax" value="0.23946">
                    <bio:group>ModelViewParmSubset_45</bio:group>
                </bio:parameter>
            </bio:mechanism>
            <bio:mechanism name="Leak" type="Channel Mechanism" passive_conductance="true">
                <bio:parameter name="e" value="-80.0">
                    <bio:group>all</bio:group>
                </bio:parameter>
                <bio:parameter name="gmax" value="-1.0E8">
                    <bio:group>all</bio:group>
                </bio:parameter>
                <bio:parameter name="el" value="-80.0">                    <!--Note: Units of extra parameters are not known, except if it's e!!-->
                    <bio:group>all</bio:group>
                </bio:parameter>
            </bio:mechanism>
            <bio:mechanism name="Leak" type="Channel Mechanism" passive_conductance="true">
                <bio:parameter name="gmax" value="0.0968117">
                    <bio:group>ModelViewParmSubset_9</bio:group>
                </bio:parameter>
            </bio:mechanism>
            <bio:mechanism name="Leak" type="Channel Mechanism" passive_conductance="true">
                <bio:parameter name="gmax" value="0.165314">
                    <bio:group>ModelViewParmSubset_36</bio:group>
                </bio:parameter>
            </bio:mechanism>
            <bio:mechanism name="Kdr" type="Channel Mechanism">
                <bio:parameter name="gmax" value="60.0">
                    <bio:group>ModelViewParmSubset_85</bio:group>
                </bio:parameter>
            </bio:mechanism>
            <bio:mechanism name="Leak" type="Channel Mechanism" passive_conductance="true">
                <bio:parameter name="gmax" value="0.106714">
                    <bio:group>ModelViewParmSubset_16</bio:group>
                </bio:parameter>
            </bio:mechanism>
            <bio:mechanism name="Leak" type="Channel Mechanism" passive_conductance="true">
                <bio:parameter name="gmax" value="0.171268">
                    <bio:group>ModelViewParmSubset_37</bio:group>
                </bio:parameter>
            </bio:mechanism>
            <bio:mechanism name="CaT" type="Channel Mechanism">
                <bio:parameter name="gmax" value="0.5">
                    <bio:group>all</bio:group>
                </bio:parameter>
            </bio:mechanism>
            <bio:mechanism name="Leak" type="Channel Mechanism" passive_conductance="true">
                <bio:parameter name="gmax" value="0.183704">
                    <bio:group>ModelViewParmSubset_39</bio:group>
                </bio:parameter>
            </bio:mechanism>
            <bio:mechanism name="Leak" type="Channel Mechanism" passive_conductance="true">
                <bio:parameter name="gmax" value="0.174451">
                    <bio:group>OneSecGrp_SectionRef_98</bio:group>
                </bio:parameter>
            </bio:mechanism>
            <bio:mechanism name="Leak" type="Channel Mechanism" passive_conductance="true">
                <bio:parameter name="gmax" value="0.307143">
                    <bio:group>ModelViewParmSubset_48</bio:group>
                </bio:parameter>
            </bio:mechanism>
            <bio:mechanism name="cad" type="Ion Concentration">                <!--Note: not adding gmax for Ion Concentration.
Value for scaling factor to apply to current to get change in conc should be
 determined from ChannelML file for the CaPool...-->
</bio:mechanism>
            <bio:mechanism name="KC" type="Channel Mechanism">
                <bio:parameter name="gmax" value="80.0">
                    <bio:group>ModelViewParmSubset_2</bio:group>
                </bio:parameter>
            </bio:mechanism>
            <bio:mechanism name="Leak" type="Channel Mechanism" passive_conductance="true">
                <bio:parameter name="gmax" value="0.110092">
                    <bio:group>ModelViewParmSubset_18</bio:group>
                </bio:parameter>
            </bio:mechanism>
            <bio:mechanism name="Kh2" type="Channel Mechanism">
                <bio:parameter name="gmax" value="0.3">
                    <bio:group>OneSecGrp_SectionRef_1</bio:group>
                </bio:parameter>
            </bio:mechanism>
            <bio:mechanism name="Leak" type="Channel Mechanism" passive_conductance="true">
                <bio:parameter name="gmax" value="0.0932852">
                    <bio:group>ModelViewParmSubset_6</bio:group>
                </bio:parameter>
            </bio:mechanism>
            <bio:mechanism name="Leak" type="Channel Mechanism" passive_conductance="true">
                <bio:parameter name="gmax" value="0.130398">
                    <bio:group>ModelViewParmSubset_27</bio:group>
                </bio:parameter>
            </bio:mechanism>
            <bio:mechanism name="Leak" type="Channel Mechanism" passive_conductance="true">
                <bio:parameter name="gmax" value="0.1">
                    <bio:group>OneSecGrp_SectionRef_1</bio:group>
                </bio:parameter>
            </bio:mechanism>
            <bio:mechanism name="Leak" type="Channel Mechanism" passive_conductance="true">
                <bio:parameter name="gmax" value="0.12506">
                    <bio:group>ModelViewParmSubset_25</bio:group>
                </bio:parameter>
            </bio:mechanism>
            <bio:mechanism name="Leak" type="Channel Mechanism" passive_conductance="true">
                <bio:parameter name="gmax" value="0.136397">
                    <bio:group>ModelViewParmSubset_29</bio:group>
                </bio:parameter>
            </bio:mechanism>
            <bio:mechanism name="KMnew2" type="Channel Mechanism">
                <bio:parameter name="gmax" value="0.01">
                    <bio:group>ModelViewParmSubset_85</bio:group>
                </bio:parameter>
            </bio:mechanism>
            <bio:mechanism name="Leak" type="Channel Mechanism" passive_conductance="true">
                <bio:parameter name="gmax" value="0.206402">
                    <bio:group>ModelViewParmSubset_42</bio:group>
                </bio:parameter>
            </bio:mechanism>
            <bio:mechanism name="Leak" type="Channel Mechanism" passive_conductance="true">
                <bio:parameter name="gmax" value="0.176656">
                    <bio:group>ModelViewParmSubset_38</bio:group>
                </bio:parameter>
            </bio:mechanism>
            <bio:mechanism name="Leak" type="Channel Mechanism" passive_conductance="true">
                <bio:parameter name="gmax" value="0.103622">
                    <bio:group>ModelViewParmSubset_14</bio:group>
                </bio:parameter>
            </bio:mechanism>
            <bio:mechanism name="Leak" type="Channel Mechanism" passive_conductance="true">
                <bio:parameter name="gmax" value="0.19013">
                    <bio:group>ModelViewParmSubset_40</bio:group>
                </bio:parameter>
            </bio:mechanism>
            <bio:mechanism name="Leak" type="Channel Mechanism" passive_conductance="true">
                <bio:parameter name="gmax" value="0.11597">
                    <bio:group>ModelViewParmSubset_21</bio:group>
                </bio:parameter>
            </bio:mechanism>
            <bio:mechanism name="Leak" type="Channel Mechanism" passive_conductance="true">
                <bio:parameter name="gmax" value="0.216786">
                    <bio:group>ModelViewParmSubset_43</bio:group>
                </bio:parameter>
            </bio:mechanism>
            <bio:mechanism name="Leak" type="Channel Mechanism" passive_conductance="true">
                <bio:parameter name="gmax" value="0.122388">
                    <bio:group>ModelViewParmSubset_24</bio:group>
                </bio:parameter>
            </bio:mechanism>
            <bio:mechanism name="Leak" type="Channel Mechanism" passive_conductance="true">
                <bio:parameter name="gmax" value="0.117874">
                    <bio:group>ModelViewParmSubset_22</bio:group>
                </bio:parameter>
            </bio:mechanism>
            <bio:mechanism name="Leak" type="Channel Mechanism" passive_conductance="true">
                <bio:parameter name="gmax" value="0.254361">
                    <bio:group>ModelViewParmSubset_46</bio:group>
                </bio:parameter>
            </bio:mechanism>
            <bio:mechanism name="Leak" type="Channel Mechanism" passive_conductance="true">
                <bio:parameter name="gmax" value="0.104995">
                    <bio:group>ModelViewParmSubset_15</bio:group>
                </bio:parameter>
            </bio:mechanism>
            <bio:mechanism name="Leak" type="Channel Mechanism" passive_conductance="true">
                <bio:parameter name="gmax" value="0.0993235">
                    <bio:group>ModelViewParmSubset_11</bio:group>
                </bio:parameter>
            </bio:mechanism>
            <bio:mechanism name="KMnew2" type="Channel Mechanism">
                <bio:parameter name="gmax" value="0.04">
                    <bio:group>OneSecGrp_SectionRef_1</bio:group>
                </bio:parameter>
            </bio:mechanism>
            <bio:mechanism name="Kdr" type="Channel Mechanism">
                <bio:parameter name="gmax" value="600.0">
                    <bio:group>OneSecGrp_SectionRef_1</bio:group>
                </bio:parameter>
            </bio:mechanism>
            <bio:mechanism name="Leak" type="Channel Mechanism" passive_conductance="true">
                <bio:parameter name="gmax" value="0.143185">
                    <bio:group>ModelViewParmSubset_31</bio:group>
                </bio:parameter>
            </bio:mechanism>
            <bio:mechanism name="Leak" type="Channel Mechanism" passive_conductance="true">
                <bio:parameter name="gmax" value="0.0957322">
                    <bio:group>ModelViewParmSubset_8</bio:group>
                </bio:parameter>
            </bio:mechanism>
            <bio:mechanism name="Kh1" type="Channel Mechanism">
                <bio:parameter name="gmax" value="0.3">
                    <bio:group>OneSecGrp_SectionRef_1</bio:group>
                </bio:parameter>
            </bio:mechanism>
            <bio:mechanism name="Leak" type="Channel Mechanism" passive_conductance="true">
                <bio:parameter name="gmax" value="0.147279">
                    <bio:group>ModelViewParmSubset_32</bio:group>
                </bio:parameter>
            </bio:mechanism>
            <bio:mechanism name="Leak" type="Channel Mechanism" passive_conductance="true">
                <bio:parameter name="gmax" value="0.139992">
                    <bio:group>ModelViewParmSubset_30</bio:group>
                </bio:parameter>
            </bio:mechanism>
            <bio:mechanism name="NaP" type="Channel Mechanism">
                <bio:parameter name="gmax" value="1.0">
                    <bio:group>OneSecGrp_SectionRef_1</bio:group>
                </bio:parameter>
            </bio:mechanism>
            <bio:mechanism name="KMnew2" type="Channel Mechanism">
                <bio:parameter name="gmax" value="0.013">
                    <bio:group>ModelViewParmSubset_86</bio:group>
                </bio:parameter>
            </bio:mechanism>
            <bio:mechanism name="Leak" type="Channel Mechanism" passive_conductance="true">
                <bio:parameter name="gmax" value="0.0981576">
                    <bio:group>ModelViewParmSubset_10</bio:group>
                </bio:parameter>
            </bio:mechanism>
            <bio:mechanism name="Leak" type="Channel Mechanism" passive_conductance="true">
                <bio:parameter name="gmax" value="0.102042">
                    <bio:group>ModelViewParmSubset_13</bio:group>
                </bio:parameter>
            </bio:mechanism>
            <bio:mechanism name="KA" type="Channel Mechanism">
                <bio:parameter name="gmax" value="2.0">
                    <bio:group>ModelViewParmSubset_85</bio:group>
                </bio:parameter>
            </bio:mechanism>
            <bio:spec_capacitance>
                <bio:parameter value="4.64862">
                    <bio:group>ModelViewParmSubset_7</bio:group>
                </bio:parameter>
                <bio:parameter value="1.64">
                    <bio:group>ModelViewParmSubset_4</bio:group>
                </bio:parameter>
                <bio:parameter value="5.41651">
                    <bio:group>ModelViewParmSubset_18</bio:group>
                </bio:parameter>
                <bio:parameter value="9.35442">
                    <bio:group>ModelViewParmSubset_40</bio:group>
                </bio:parameter>
                <bio:parameter value="6.8876">
                    <bio:group>ModelViewParmSubset_30</bio:group>
                </bio:parameter>
                <bio:parameter value="7.65725">
                    <bio:group>ModelViewParmSubset_34</bio:group>
                </bio:parameter>
                <bio:parameter value="5.59871">
                    <bio:group>ModelViewParmSubset_20</bio:group>
                </bio:parameter>
                <bio:parameter value="15.1114">
                    <bio:group>ModelViewParmSubset_48</bio:group>
                </bio:parameter>
                <bio:parameter value="5.09819">
                    <bio:group>ModelViewParmSubset_14</bio:group>
                </bio:parameter>
                <bio:parameter value="4.82935">
                    <bio:group>ModelViewParmSubset_10</bio:group>
                </bio:parameter>
                <bio:parameter value="5.51376">
                    <bio:group>ModelViewParmSubset_19</bio:group>
                </bio:parameter>
                <bio:parameter value="8.42637">
                    <bio:group>ModelViewParmSubset_37</bio:group>
                </bio:parameter>
                <bio:parameter value="6.41559">
                    <bio:group>ModelViewParmSubset_27</bio:group>
                </bio:parameter>
                <bio:parameter value="4.95833">
                    <bio:group>ModelViewParmSubset_12</bio:group>
                </bio:parameter>
                <bio:parameter value="10.6659">
                    <bio:group>ModelViewParmSubset_43</bio:group>
                </bio:parameter>
                <bio:parameter value="5.25035">
                    <bio:group>ModelViewParmSubset_16</bio:group>
                </bio:parameter>
                <bio:parameter value="9.77141">
                    <bio:group>ModelViewParmSubset_41</bio:group>
                </bio:parameter>
                <bio:parameter value="8.13343">
                    <bio:group>ModelViewParmSubset_36</bio:group>
                </bio:parameter>
                <bio:parameter value="5.79939">
                    <bio:group>ModelViewParmSubset_22</bio:group>
                </bio:parameter>
                <bio:parameter value="6.71071">
                    <bio:group>ModelViewParmSubset_29</bio:group>
                </bio:parameter>
                <bio:parameter value="5.02047">
                    <bio:group>ModelViewParmSubset_13</bio:group>
                </bio:parameter>
                <bio:parameter value="5.91766">
                    <bio:group>ModelViewParmSubset_23</bio:group>
                </bio:parameter>
                <bio:parameter value="4.58963">
                    <bio:group>ModelViewParmSubset_6</bio:group>
                </bio:parameter>
                <bio:parameter value="7.04471">
                    <bio:group>ModelViewParmSubset_31</bio:group>
                </bio:parameter>
                <bio:parameter value="9.03825">
                    <bio:group>ModelViewParmSubset_39</bio:group>
                </bio:parameter>
                <bio:parameter value="5.70571">
                    <bio:group>ModelViewParmSubset_21</bio:group>
                </bio:parameter>
                <bio:parameter value="4.71002">
                    <bio:group>ModelViewParmSubset_8</bio:group>
                </bio:parameter>
                <bio:parameter value="5.16573">
                    <bio:group>ModelViewParmSubset_15</bio:group>
                </bio:parameter>
                <bio:parameter value="4.88672">
                    <bio:group>ModelViewParmSubset_11</bio:group>
                </bio:parameter>
                <bio:parameter value="8.58298">
                    <bio:group>OneSecGrp_SectionRef_98</bio:group>
                </bio:parameter>
                <bio:parameter value="12.5145">
                    <bio:group>ModelViewParmSubset_46</bio:group>
                </bio:parameter>
                <bio:parameter value="13.2116">
                    <bio:group>ModelViewParmSubset_47</bio:group>
                </bio:parameter>
                <bio:parameter value="4.76314">
                    <bio:group>ModelViewParmSubset_9</bio:group>
                </bio:parameter>
                <bio:parameter value="6.15293">
                    <bio:group>ModelViewParmSubset_25</bio:group>
                </bio:parameter>
                <bio:parameter value="5.33913">
                    <bio:group>ModelViewParmSubset_17</bio:group>
                </bio:parameter>
                <bio:parameter value="11.7814">
                    <bio:group>ModelViewParmSubset_45</bio:group>
                </bio:parameter>
                <bio:parameter value="6.29251">
                    <bio:group>ModelViewParmSubset_26</bio:group>
                </bio:parameter>
                <bio:parameter value="7.90796">
                    <bio:group>ModelViewParmSubset_35</bio:group>
                </bio:parameter>
                <bio:parameter value="6.57217">
                    <bio:group>ModelViewParmSubset_28</bio:group>
                </bio:parameter>
                <bio:parameter value="11.242">
                    <bio:group>ModelViewParmSubset_44</bio:group>
                </bio:parameter>
                <bio:parameter value="10.155">
                    <bio:group>ModelViewParmSubset_42</bio:group>
                </bio:parameter>
                <bio:parameter value="4.54221">
                    <bio:group>ModelViewParmSubset_5</bio:group>
                </bio:parameter>
                <bio:parameter value="7.42581">
                    <bio:group>ModelViewParmSubset_33</bio:group>
                </bio:parameter>
                <bio:parameter value="7.24613">
                    <bio:group>ModelViewParmSubset_32</bio:group>
                </bio:parameter>
                <bio:parameter value="6.02149">
                    <bio:group>ModelViewParmSubset_24</bio:group>
                </bio:parameter>
                <bio:parameter value="8.69146">
                    <bio:group>ModelViewParmSubset_38</bio:group>
                </bio:parameter>
            </bio:spec_capacitance>
            <bio:spec_axial_resistance>
                <bio:parameter value="0.25">
                    <bio:group>all</bio:group>
                </bio:parameter>
            </bio:spec_axial_resistance>
            <bio:init_memb_potential>
                <bio:parameter value="-65.0">
                    <bio:group>all</bio:group>
                </bio:parameter>
            </bio:init_memb_potential>
        </biophysics>
        <connectivity>
            <net:potential_syn_loc synapse_type="AMPA_GranGol" synapse_direction="post">
                <net:group>dendrite_group</net:group>
            </net:potential_syn_loc>
        </connectivity>
    </cell>
    <cell name="Golgi_040408_C1_v2">
        <meta:notes>Cell morphology generated by neuroConstruct from file: Golgi_040408_C1.ASC
V3 text file written for MicroBrightField products.
See the main project description for more details on the cells included with this project.</meta:notes>
        <mml:segments>
            <mml:segment id="0" name="RootSegment" cable="0">
                <mml:proximal x="0.0" y="0.0" z="0.0" diameter="27.0"/>
                <mml:distal x="0.0" y="0.0" z="0.0" diameter="27.0"/>
                <mml:properties>
                    <meta:property>
                        <meta:tag>comment</meta:tag>
                        <meta:value>Root Segment, parent of all dendrites, etc. Should be edited to create biologically accurate soma based on soma outline</meta:value>
                    </meta:property>
                </mml:properties>
            </mml:segment>
            <mml:segment id="30" name="AxonBlue_1_R" parent="0" cable="1">
                <mml:proximal x="0.03" y="-10.04" z="1.1" diameter="2.66"/>
                <mml:distal x="0.32" y="-13.14" z="1.1" diameter="1.77"/>
                <mml:properties>
                    <meta:property>
                        <meta:tag>comment</meta:tag>
                        <meta:value>First segment of new sub branch</meta:value>
                    </meta:property>
                </mml:properties>
            </mml:segment>
            <mml:segment id="31" name="AxonBlue_10000" parent="30" cable="1">
                <mml:distal x="0.17" y="-15.87" z="1.1" diameter="1.48"/>
            </mml:segment>
            <mml:segment id="32" name="AxonBlue_10001" parent="31" cable="1">
                <mml:distal x="-0.42" y="-18.380001" z="1.05" diameter="1.26"/>
            </mml:segment>
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        </mml:segments>
        <mml:cables>
            <mml:cable id="0" name="Soma">
                <meta:group>all</meta:group>
                <meta:group>soma_group</meta:group>
            </mml:cable>
            <mml:cable id="1" name="SecAxonBlue_1_R">
                <meta:group>all</meta:group>
                <meta:group>colour_Blue</meta:group>
                <meta:group>axon_group</meta:group>
            </mml:cable>
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        </mml:cables>
        <!--Adding the biophysical parameters-->
        <biophysics units="Physiological Units">
            <bio:mechanism name="KV" type="Channel Mechanism">
                <bio:parameter name="gmax" value="32.0">
                    <bio:group>soma_group</bio:group>
                </bio:parameter>
            </bio:mechanism>
            <bio:mechanism name="NaT" type="Channel Mechanism">
                <bio:parameter name="gmax" value="48.0">
                    <bio:group>soma_group</bio:group>
                </bio:parameter>
            </bio:mechanism>
            <bio:mechanism name="LeakConductance" type="Channel Mechanism" passive_conductance="true">
                <bio:parameter name="e" value="-55.0">
                    <bio:group>all</bio:group>
                </bio:parameter>
                <bio:parameter name="gmax" value="0.021">
                    <bio:group>all</bio:group>
                </bio:parameter>
            </bio:mechanism>
            <bio:mechanism name="HCN2" type="Channel Mechanism">
                <bio:parameter name="gmax" value="0.08">
                    <bio:group>soma_group</bio:group>
                </bio:parameter>
            </bio:mechanism>
            <bio:mechanism name="CALC_ca2" type="Ion Concentration">                <!--Note: not adding gmax for Ion Concentration.
Value for scaling factor to apply to current to get change in conc should be
 determined from ChannelML file for the CaPool...-->
</bio:mechanism>
            <bio:mechanism name="CALC" type="Ion Concentration">                <!--Note: not adding gmax for Ion Concentration.
Value for scaling factor to apply to current to get change in conc should be
 determined from ChannelML file for the CaPool...-->
</bio:mechanism>
            <bio:mechanism name="NaR" type="Channel Mechanism">
                <bio:parameter name="gmax" value="1.7">
                    <bio:group>soma_group</bio:group>
                </bio:parameter>
            </bio:mechanism>
            <bio:mechanism name="KBK_fixed" type="Channel Mechanism">
                <bio:parameter name="gmax" value="3.0">
                    <bio:group>soma_group</bio:group>
                </bio:parameter>
            </bio:mechanism>
            <bio:mechanism name="KSK" type="Channel Mechanism">
                <bio:parameter name="gmax" value="38.0">
                    <bio:group>soma_group</bio:group>
                </bio:parameter>
            </bio:mechanism>
            <bio:mechanism name="HCN1" type="Channel Mechanism">
                <bio:parameter name="gmax" value="0.05">
                    <bio:group>soma_group</bio:group>
                </bio:parameter>
            </bio:mechanism>
            <bio:mechanism name="KA_VervaekeEtAl" type="Channel Mechanism">
                <bio:parameter name="gmax" value="8.0">
                    <bio:group>soma_group</bio:group>
                </bio:parameter>
            </bio:mechanism>
            <bio:mechanism name="NaP_VervaekeEtAl" type="Channel Mechanism">
                <bio:parameter name="gmax" value="0.19">
                    <bio:group>soma_group</bio:group>
                </bio:parameter>
            </bio:mechanism>
            <bio:mechanism name="KM" type="Channel Mechanism">
                <bio:parameter name="gmax" value="1.0">
                    <bio:group>soma_group</bio:group>
                </bio:parameter>
            </bio:mechanism>
            <bio:mechanism name="Ca_LVA" type="Channel Mechanism">
                <bio:parameter name="gmax" value="0.25">
                    <bio:group>soma_group</bio:group>
                </bio:parameter>
            </bio:mechanism>
            <bio:mechanism name="Ca_HVA" type="Channel Mechanism">
                <bio:parameter name="gmax" value="0.46">
                    <bio:group>soma_group</bio:group>
                </bio:parameter>
            </bio:mechanism>
            <bio:spec_capacitance>
                <bio:parameter value="1.0">
                    <bio:group>all</bio:group>
                </bio:parameter>
            </bio:spec_capacitance>
            <bio:spec_axial_resistance>
                <bio:parameter value="0.1">
                    <bio:group>all</bio:group>
                </bio:parameter>
            </bio:spec_axial_resistance>
            <bio:init_memb_potential>
                <bio:parameter value="-60.0">
                    <bio:group>all</bio:group>
                </bio:parameter>
            </bio:init_memb_potential>
            <bio:ion_props name="k">
                <bio:parameter name="e" value="-84.69">
                    <bio:group>soma_group</bio:group>
                </bio:parameter>
            </bio:ion_props>
            <bio:ion_props name="na">
                <bio:parameter name="e" value="87.39">
                    <bio:group>soma_group</bio:group>
                </bio:parameter>
            </bio:ion_props>
        </biophysics>
        <connectivity>
            <net:potential_syn_loc synapse_type="MultiDecaySyn">
                <net:group>basolateral</net:group>
            </net:potential_syn_loc>
            <net:potential_syn_loc synapse_type="AMPA_GranGol" synapse_direction="post">
                <net:group>dendrite_group</net:group>
            </net:potential_syn_loc>
            <net:potential_syn_loc synapse_type="ApicalSyn">
                <net:group>apical</net:group>
            </net:potential_syn_loc>
            <net:potential_syn_loc synapse_type="GapJuncCML" synapse_direction="post">
                <net:group>dendrite_group</net:group>
            </net:potential_syn_loc>
        </connectivity>
    </cell>
    <cell name="Granule2">
        <meta:notes>An extension to 3D of the Granule cell model from:

Maex, R and De Schutter, E. Synchronization of Golgi and Granule Cell Firing in a Detailed Network Model of the Cerebellar Granule Cell Layer, 1998

incorporating channel mechanisms based on ChannelML</meta:notes>
        <mml:segments>
            <mml:segment id="0" name="Soma" cable="0">
                <mml:proximal x="0.0" y="0.0" z="0.0" diameter="10.0"/>
                <mml:distal x="0.0" y="0.0" z="0.0" diameter="10.0"/>
            </mml:segment>
            <mml:segment id="1" name="AscendingSegSec" parent="0" cable="1">
                <mml:proximal x="0.0" y="0.0" z="0.0" diameter="1.0"/>
                <mml:distal x="0.0" y="280.0" z="0.0" diameter="1.0"/>
            </mml:segment>
            <mml:segment id="2" name="LeftParallelFiberSeg" parent="1" cable="2">
                <mml:proximal x="0.0" y="280.0" z="0.0" diameter="1.0"/>
                <mml:distal x="0.0" y="280.0" z="-500.0" diameter="1.0"/>
            </mml:segment>
            <mml:segment id="3" name="RightParallelFiberSeg" parent="1" cable="3">
                <mml:proximal x="0.0" y="280.0" z="0.0" diameter="1.0"/>
                <mml:distal x="0.0" y="280.0" z="500.0" diameter="1.0"/>
            </mml:segment>
        </mml:segments>
        <mml:cables>
            <mml:cable id="0" name="Soma">
                <meta:group>all</meta:group>
                <meta:group>soma_group</meta:group>
            </mml:cable>
            <mml:cable id="1" name="AscendingSeg" fract_along_parent="0.0">
                <meta:group>all</meta:group>
                <meta:group>axon_group</meta:group>
            </mml:cable>
            <mml:cable id="2" name="LeftParallelFiber">
                <meta:group>all</meta:group>
                <meta:group>axon_group</meta:group>
                <meta:group>parallel_fibers</meta:group>
            </mml:cable>
            <mml:cable id="3" name="RightParallelFiber">
                <meta:group>all</meta:group>
                <meta:group>axon_group</meta:group>
                <meta:group>parallel_fibers</meta:group>
            </mml:cable>
        </mml:cables>
        <!--Adding the biophysical parameters-->
        <biophysics units="Physiological Units">
            <bio:mechanism name="Gran_CaPool_98" type="Ion Concentration">                <!--Note: not adding gmax for Ion Concentration.
Value for scaling factor to apply to current to get change in conc should be
 determined from ChannelML file for the CaPool...-->
</bio:mechanism>
            <bio:mechanism name="Gran_CaHVA_98" type="Channel Mechanism">
                <bio:parameter name="gmax" value="0.9084216">
                    <bio:group>soma_group</bio:group>
                </bio:parameter>
            </bio:mechanism>
            <bio:mechanism name="GranPassiveCond" type="Channel Mechanism" passive_conductance="true">
                <bio:parameter name="e" value="-65.0">
                    <bio:group>soma_group</bio:group>
                </bio:parameter>
                <bio:parameter name="gmax" value="0.0330033">
                    <bio:group>soma_group</bio:group>
                </bio:parameter>
            </bio:mechanism>
            <bio:mechanism name="Gran_KCa_98" type="Channel Mechanism">
                <bio:parameter name="gmax" value="17.9811">
                    <bio:group>soma_group</bio:group>
                </bio:parameter>
            </bio:mechanism>
            <bio:mechanism name="Gran_KDr_98" type="Channel Mechanism">
                <bio:parameter name="gmax" value="8.89691">
                    <bio:group>soma_group</bio:group>
                </bio:parameter>
            </bio:mechanism>
            <bio:mechanism name="Gran_KA_98" type="Channel Mechanism">
                <bio:parameter name="gmax" value="1.14567">
                    <bio:group>soma_group</bio:group>
                </bio:parameter>
            </bio:mechanism>
            <bio:mechanism name="Gran_H_98" type="Channel Mechanism">
                <bio:parameter name="gmax" value="0.03090506">
                    <bio:group>soma_group</bio:group>
                </bio:parameter>
            </bio:mechanism>
            <bio:mechanism name="Gran_NaF_98" type="Channel Mechanism">
                <bio:parameter name="gmax" value="55.7227">
                    <bio:group>soma_group</bio:group>
                </bio:parameter>
            </bio:mechanism>
            <bio:spec_capacitance>
                <bio:parameter value="1.0">
                    <bio:group>all</bio:group>
                </bio:parameter>
            </bio:spec_capacitance>
            <bio:spec_axial_resistance>
                <bio:parameter value="0.1">
                    <bio:group>all</bio:group>
                </bio:parameter>
            </bio:spec_axial_resistance>
            <bio:init_memb_potential>
                <bio:parameter value="-65.0">
                    <bio:group>all</bio:group>
                </bio:parameter>
            </bio:init_memb_potential>
            <bio:ion_props name="h">
                <bio:parameter name="e" value="-42.0">
                    <bio:group>all</bio:group>
                </bio:parameter>
            </bio:ion_props>
            <bio:ion_props name="k">
                <bio:parameter name="e" value="-90.0">
                    <bio:group>all</bio:group>
                </bio:parameter>
            </bio:ion_props>
            <bio:ion_props name="ca">
                <bio:parameter name="conc_e" value="2.4E-6">
                    <bio:group>all</bio:group>
                </bio:parameter>
                <bio:parameter name="conc_i" value="7.55E-11">
                    <bio:group>all</bio:group>
                </bio:parameter>
            </bio:ion_props>
            <bio:ion_props name="na">
                <bio:parameter name="e" value="55.0">
                    <bio:group>all</bio:group>
                </bio:parameter>
            </bio:ion_props>
            <!--
Note that the following Ap Prop Speeds are specified for the cell, but this is not yet supported by NeuroML!
  - AP propagation speed: 1000.0 ?m ms^-1 is present on: [axon_group]
-->
</biophysics>
        <connectivity>
            <net:potential_syn_loc synapse_type="AMPA_GranGol">
                <net:group>parallel_fibers</net:group>
            </net:potential_syn_loc>
            <net:potential_syn_loc synapse_type="MF_AMPA" synapse_direction="preAndOrPost">
                <net:group>soma_group</net:group>
            </net:potential_syn_loc>
            <net:potential_syn_loc synapse_type="NMDA" synapse_direction="preAndOrPost">
                <net:group>soma_group</net:group>
            </net:potential_syn_loc>
            <net:potential_syn_loc synapse_type="GABAA" synapse_direction="preAndOrPost">
                <net:group>soma_group</net:group>
            </net:potential_syn_loc>
        </connectivity>
    </cell>
</cells>

<channels units="Physiological Units">
    <ion name="ca" charge="2" role="SignallingSubstance" xmlns="http://morphml.org/channelml/schema">
        <meta:notes>Signifies that the ion is involved in a process which alters its concentration</meta:notes>
    </ion>
    <ion name="ca" charge="2" role="SignallingSubstance" xmlns="http://morphml.org/channelml/schema">
        <meta:notes>Signifies that the ion is involved in a process which alters its concentration</meta:notes>
    </ion>
    <ion name="na" charge="1" default_erev="45" xmlns="http://morphml.org/channelml/schema"/>    <ion name="na" charge="1" default_erev="45" xmlns="http://morphml.org/channelml/schema"/>    <ion name="non_specific" charge="1" default_erev="-60" xmlns="http://morphml.org/channelml/schema"/>    <ion name="non_specific" charge="1" default_erev="-55" xmlns="http://morphml.org/channelml/schema"/>    <ion name="non_specific" charge="1" default_erev="-80" xmlns="http://morphml.org/channelml/schema"/>    <ion name="k" charge="1" default_erev="-85" xmlns="http://morphml.org/channelml/schema"/>    <ion name="k" charge="1" default_erev="-85" xmlns="http://morphml.org/channelml/schema"/>    <ion name="k" charge="1" default_erev="-85" xmlns="http://morphml.org/channelml/schema"/>    <ion name="k" charge="1" default_erev="-85" xmlns="http://morphml.org/channelml/schema"/>    <ion name="ca" charge="2" role="ModulatingSubstance" xmlns="http://morphml.org/channelml/schema">
        <meta:notes>The channel's conductance of K is dependent on this ion's concentration</meta:notes>
    </ion>
    <ion name="k" charge="1" default_erev="-85" role="PermeatedSubstance" xmlns="http://morphml.org/channelml/schema">
        <meta:notes>The ion which actually flows through the channel</meta:notes>
    </ion>
    <ion name="k" charge="1" default_erev="-85" xmlns="http://morphml.org/channelml/schema"/>    <ion name="ca" charge="2" role="ModulatingSubstance" xmlns="http://morphml.org/channelml/schema">
        <meta:notes>The channel's conductance of K is dependent on this ion's concentration</meta:notes>
    </ion>
    <ion name="k" charge="1" default_erev="-85" role="PermeatedSubstance" xmlns="http://morphml.org/channelml/schema">
        <meta:notes>The ion which actually flows through the channel</meta:notes>
    </ion>
    <ion name="ca" charge="2" default_erev="137.52625" xmlns="http://morphml.org/channelml/schema"/>    <ion name="ca" charge="2" default_erev="137.52625" xmlns="http://morphml.org/channelml/schema"/>    <channel_type name="CaP" density="yes" xmlns="http://morphml.org/channelml/schema">

        <status value="stable">
            <meta:comment>Verified equivalence of NEURON and GENESIS mapping to orig NEURON mod impl at 0.02ms dt with current pulse (but 0.002 is better)</meta:comment>
            <meta:comment>Changed to a larger value of max_v for testing equivalence with orig NEURON mod impl at v close to ca rev pot (~137mV)</meta:comment>
            <meta:contributor>
                <meta:name>Padraig Gleeson</meta:name>
            </meta:contributor>
        </status>

        <meta:notes>P type Ca current. Based on Roth et al's reimplementation of original GENESIS model in NEURON</meta:notes>

        <meta:authorList>
            <meta:modelAuthor>
                <meta:name>De Schutter, E.</meta:name>
            </meta:modelAuthor>
            <meta:modelAuthor>
                <meta:name>Bower, J.</meta:name>
            </meta:modelAuthor>
            <meta:modelTranslator>
                <meta:name>Padraig Gleeson</meta:name>
                <meta:institution>UCL</meta:institution>
                <meta:email>p.gleeson - at - ucl.ac.uk</meta:email>
            </meta:modelTranslator>
            <meta:modelTranslator>
                <meta:name>Jenny Davie</meta:name>
                <meta:institution>UCL</meta:institution>
                <meta:comment>Conversion of GENESIS model to NEURON</meta:comment>
            </meta:modelTranslator>
            <meta:modelTranslator>
                <meta:name>Arnd Roth</meta:name>
                <meta:institution>UCL</meta:institution>
                <meta:comment>Conversion of GENESIS model to NEURON</meta:comment>
            </meta:modelTranslator>
            <meta:modelTranslator>
                <meta:name>Volker Steuber</meta:name>
                <meta:institution>UCL</meta:institution>
                <meta:comment>Conversion of GENESIS model to NEURON</meta:comment>
            </meta:modelTranslator>
            <meta:modelTranslator>
                <meta:name>Michael Hausser</meta:name>
                <meta:institution>UCL</meta:institution>
                <meta:comment>Conversion of GENESIS model to NEURON</meta:comment>
            </meta:modelTranslator>

        </meta:authorList>

        <meta:publication>
            <meta:fullTitle>De Schutter, E., and Bower, J. M. (1994). An active membrane model of the cerebellar Purkinje cell. I. Simulation of current clamps in slice. J Neurophysiol 71, 375-400.</meta:fullTitle>
            <meta:pubmedRef>http://www.ncbi.nlm.nih.gov/entrez/query.fcgi?db=pubmed&amp;cmd=Retrieve&amp;dopt=AbstractPlus&amp;list_uids=7512629</meta:pubmedRef>
        </meta:publication>

        <meta:neuronDBref>
           <meta:modelName>Calcium channels</meta:modelName>
           <meta:uri>http://senselab.med.yale.edu/senselab/NeuronDB/channelGene2.htm#table1</meta:uri>
        </meta:neuronDBref>

        <current_voltage_relation>
            <ohmic ion="ca">
                <conductance default_gmax="4.5">                 <!-- phys units: mS/cm2 -->

                    <rate_adjustments>
                        <q10_settings q10_factor="3" experimental_temp="37"/>
                    </rate_adjustments>

                    <gate power="1">
                        <state name="m" fraction="1"/>
                    </gate>
                    <gate power="1">
                        <state name="h" fraction="1"/>
                    </gate>

                </conductance>
            </ohmic>
        </current_voltage_relation>

        <hh_gate state="m">
            <transition>
                <voltage_gate>
                    <alpha>
                        <parameterised_hh type="sigmoid" expr="A/(1 + exp(k*(v-d)))">
                            <parameter name="A" value="8.5"/>
                            <parameter name="k" value="-0.08"/>
                            <parameter name="d" value="8"/>
                        </parameterised_hh>
                    </alpha>
                    <beta>
                        <parameterised_hh type="sigmoid" expr="A/(1 + exp(k*(v-d)))">
                            <parameter name="A" value="35"/>
                            <parameter name="k" value="0.0689655"/>
                            <parameter name="d" value="-74"/>
                        </parameterised_hh>
                    </beta>
                </voltage_gate>
            </transition>
        </hh_gate>

        <hh_gate state="h">
            <transition>
                <voltage_gate>
                    <alpha>
                        <parameterised_hh type="sigmoid" expr="A/(1 + exp(k*(v-d)))">
                            <parameter name="A" value="0.0015"/>
                            <parameter name="k" value="0.125"/>
                            <parameter name="d" value="-29"/>
                        </parameterised_hh>
                    </alpha>
                    <beta>
                        <parameterised_hh type="sigmoid" expr="A/(1 + exp(k*(v-d)))">
                            <parameter name="A" value="0.0055"/>
                            <parameter name="k" value="-0.125"/>
                            <parameter name="d" value="-23"/>
                        </parameterised_hh>
                    </beta>
                </voltage_gate>
            </transition>
        </hh_gate>

        <impl_prefs>
            <table_settings max_v="150" min_v="-100" table_divisions="250"/>     <!-- 150 max v as eca is high... -->

        </impl_prefs>

    </channel_type>
    <channel_type name="CaT" density="yes" xmlns="http://morphml.org/channelml/schema">

        <status value="stable">
            <meta:comment>Verified equivalence of NEURON and GENESIS mapping to orig NEURON mod impl at 0.02ms dt with current pulse (but 0.002 is better)</meta:comment>
            <meta:contributor>
                <meta:name>Padraig Gleeson</meta:name>
            </meta:contributor>
        </status>

        <meta:notes>T type Ca current. Based on Roth et al's reimplementation of original GENESIS model in NEURON</meta:notes>

        <meta:authorList>
            <meta:modelAuthor>
                <meta:name>De Schutter, E.</meta:name>
            </meta:modelAuthor>
            <meta:modelAuthor>
                <meta:name>Bower, J.</meta:name>
            </meta:modelAuthor>
            <meta:modelTranslator>
                <meta:name>Padraig Gleeson</meta:name>
                <meta:institution>UCL</meta:institution>
                <meta:email>p.gleeson - at - ucl.ac.uk</meta:email>
            </meta:modelTranslator>
            <meta:modelTranslator>
                <meta:name>Jenny Davie</meta:name>
                <meta:institution>UCL</meta:institution>
                <meta:comment>Conversion of GENESIS model to NEURON</meta:comment>
            </meta:modelTranslator>
            <meta:modelTranslator>
                <meta:name>Arnd Roth</meta:name>
                <meta:institution>UCL</meta:institution>
                <meta:comment>Conversion of GENESIS model to NEURON</meta:comment>
            </meta:modelTranslator>
            <meta:modelTranslator>
                <meta:name>Volker Steuber</meta:name>
                <meta:institution>UCL</meta:institution>
                <meta:comment>Conversion of GENESIS model to NEURON</meta:comment>
            </meta:modelTranslator>
            <meta:modelTranslator>
                <meta:name>Michael Hausser</meta:name>
                <meta:institution>UCL</meta:institution>
                <meta:comment>Conversion of GENESIS model to NEURON</meta:comment>
            </meta:modelTranslator>

        </meta:authorList>

        <meta:publication>
            <meta:fullTitle>De Schutter, E., and Bower, J. M. (1994). An active membrane model of the cerebellar Purkinje cell. I. Simulation of current clamps in slice. J Neurophysiol 71, 375-400.</meta:fullTitle>
            <meta:pubmedRef>http://www.ncbi.nlm.nih.gov/entrez/query.fcgi?db=pubmed&amp;cmd=Retrieve&amp;dopt=AbstractPlus&amp;list_uids=7512629</meta:pubmedRef>
        </meta:publication>

        <meta:neuronDBref>
           <meta:modelName>Calcium channels</meta:modelName>
           <meta:uri>http://senselab.med.yale.edu/senselab/NeuronDB/channelGene2.htm#table1</meta:uri>
        </meta:neuronDBref>

        <current_voltage_relation>
            <ohmic ion="ca">
                <conductance default_gmax="0.5">                 <!-- phys units: mS/cm2 -->

                    <rate_adjustments>
                        <q10_settings q10_factor="3" experimental_temp="37"/>
                    </rate_adjustments>

                    <gate power="1">
                        <state name="m" fraction="1"/>
                    </gate>
                    <gate power="1">
                        <state name="h" fraction="1"/>
                    </gate>

                </conductance>
            </ohmic>
        </current_voltage_relation>

        <hh_gate state="m">
            <transition>
                <voltage_gate>
                    <alpha>
                        <parameterised_hh type="sigmoid" expr="A/(1 + exp(k*(v-d)))">
                            <parameter name="A" value="2.6"/>
                            <parameter name="k" value="-0.125"/>
                            <parameter name="d" value="-21"/>
                        </parameterised_hh>
                    </alpha>
                    <beta>
                        <parameterised_hh type="sigmoid" expr="A/(1 + exp(k*(v-d)))">
                            <parameter name="A" value="0.18"/>
                            <parameter name="k" value="0.25"/>
                            <parameter name="d" value="-40"/>
                        </parameterised_hh>
                    </beta>
                </voltage_gate>
            </transition>
        </hh_gate>

        <hh_gate state="h">
            <transition>
                <voltage_gate>
                    <alpha>
                        <parameterised_hh type="sigmoid" expr="A/(1 + exp(k*(v-d)))">
                            <parameter name="A" value="0.0025"/>
                            <parameter name="k" value="0.125"/>
                            <parameter name="d" value="-40"/>
                        </parameterised_hh>
                    </alpha>
                    <beta>
                        <parameterised_hh type="sigmoid" expr="A/(1 + exp(k*(v-d)))">
                            <parameter name="A" value="0.19"/>
                            <parameter name="k" value="-0.1"/>
                            <parameter name="d" value="-50"/>
                        </parameterised_hh>
                    </beta>
                </voltage_gate>
            </transition>
        </hh_gate>

        <impl_prefs>
            <table_settings max_v="100" min_v="-100" table_divisions="200"/>
        </impl_prefs>

    </channel_type>
    <channel_type name="Gran_CaHVA_98" xmlns="http://morphml.org/channelml/schema">

        <status value="stable">
            <meta:comment>Verified equivalence of NEURON and GENESIS mapping to orig GENESIS impl from www.tnb.ua.ac.be.</meta:comment>
            <meta:comment>Updated to post v1.7.3 new ChannelML format</meta:comment>
            <meta:contributor>
                <meta:name>Padraig Gleeson</meta:name>
            </meta:contributor>
        </status>

        <meta:notes>A High Voltage Activated Ca2+ channel</meta:notes>

        <meta:authorList>
            <meta:modelAuthor>
                <meta:name>Maex, R.</meta:name>
            </meta:modelAuthor>
            <meta:modelAuthor>
                <meta:name>De Schutter, E.</meta:name>
            </meta:modelAuthor>
            <meta:modelTranslator>
                <meta:name>Padraig Gleeson</meta:name>
                <meta:institution>UCL</meta:institution>
                <meta:email>p.gleeson - at - ucl.ac.uk</meta:email>
            </meta:modelTranslator>
        </meta:authorList>

        <meta:publication>
           <meta:fullTitle>Maex, R and De Schutter, E.
           Synchronization of Golgi and Granule Cell Firing in a Detailed Network Model of the
           cerebellar Granule Cell Layer. J Neurophysiol, Nov 1998; 80: 2521 - 2537</meta:fullTitle>
           <meta:pubmedRef>http://www.ncbi.nlm.nih.gov/entrez/query.fcgi?cmd=Retrieve&amp;db=PubMed&amp;list_uids=9819260&amp;dopt=Abstract</meta:pubmedRef>
        </meta:publication>

        <meta:neuronDBref>
           <meta:modelName>Calcium channels</meta:modelName>
           <meta:uri>http://senselab.med.yale.edu/senselab/NeuronDB/channelGene2.htm#table1</meta:uri>
        </meta:neuronDBref>

        <current_voltage_relation cond_law="ohmic" ion="ca" default_gmax="9.084216" default_erev="0.080" charge="2" fixed_erev="yes">      <!-- In the orig model, [Ca] alterations didn't alter erev for channel from 80mV -->

            <q10_settings q10_factor="3" experimental_temp="17.350264793"/>
            <offset value="0.010"/>

            <gate name="m" instances="2">
                <closed_state id="m0"/>
                <open_state id="m"/>

                <transition name="alpha" from="m0" to="m" expr_form="sigmoid" rate="1600" scale="-0.01388888889" midpoint="0.005"/>
                <transition name="beta" from="m" to="m0" expr_form="exp_linear" rate="100" scale="-0.005" midpoint="-0.0089"/>

            </gate>

            <gate name="h" instances="1">
                <closed_state id="h0"/>
                <open_state id="h"/>

                <transition name="alpha" from="h0" to="h" expr_form="generic" expr="v  &lt; -0.060 ? 5.0 : 5 * (exp (-50 * (v - (-0.060))))"/>
                <transition name="beta" from="h" to="h0" expr_form="generic" expr="v  &lt; -0.060 ? 0 : 5 - (5 * (exp (-50 * (v - (-0.060)))))"/>

            </gate>
        </current_voltage_relation>

    </channel_type>
    <channel_type name="Gran_H_98" xmlns="http://morphml.org/channelml/schema">

        <status value="stable">
            <meta:comment>Verified equivalence of NEURON and GENESIS mapping to orig GENESIS impl from www.tnb.ua.ac.be</meta:comment>
            <meta:comment>Updated to post v1.7.3 new ChannelML format</meta:comment>
            <meta:issue>A values don't match table 1 in M and DeS 98</meta:issue>
            <meta:contributor>
                <meta:name>Padraig Gleeson</meta:name>
            </meta:contributor>
        </status>

        <meta:notes>Anomalous inward rectifying H conductance</meta:notes>

        <meta:authorList>
            <meta:modelAuthor>
                <meta:name>Maex, R.</meta:name>
            </meta:modelAuthor>
            <meta:modelAuthor>
                <meta:name>De Schutter, E.</meta:name>
            </meta:modelAuthor>
            <meta:modelTranslator>
                <meta:name>Padraig Gleeson</meta:name>
                <meta:institution>UCL</meta:institution>
                <meta:email>p.gleeson - at - ucl.ac.uk</meta:email>
            </meta:modelTranslator>
        </meta:authorList>

        <meta:publication>
           <meta:fullTitle>Maex, R and De Schutter, E.
           Synchronization of Golgi and Granule Cell Firing in a Detailed Network Model of the
           cerebellar Granule Cell Layer. J Neurophysiol, Nov 1998; 80: 2521 - 2537</meta:fullTitle>
           <meta:pubmedRef>http://www.ncbi.nlm.nih.gov/entrez/query.fcgi?cmd=Retrieve&amp;db=PubMed&amp;list_uids=9819260&amp;dopt=Abstract</meta:pubmedRef>
        </meta:publication>

        <current_voltage_relation cond_law="ohmic" ion="h" default_gmax="0.30905062" default_erev="-0.042">

            <q10_settings q10_factor="3" experimental_temp="17.350264793"/>
            <offset value="0.01"/>

            <gate name="n" instances="1">
                <closed_state id="n0"/>
                <open_state id="n"/>

                <transition name="alpha" from="n0" to="n" expr_form="exponential" rate="0.8" scale="-0.01100110011" midpoint="-0.075"/>
                <transition name="beta" from="n" to="n0" expr_form="exponential" rate="0.8" scale="0.01100110011" midpoint="-0.075"/>

            </gate>
        </current_voltage_relation>

    </channel_type>
    <channel_type name="Gran_KA_98" xmlns="http://morphml.org/channelml/schema">

        <status value="stable">
            <meta:comment>Verified equivalence of NEURON and GENESIS mapping to orig GENESIS impl from www.tnb.ua.ac.be</meta:comment>
            <meta:comment>Updated to post v1.7.3 new ChannelML format</meta:comment>
            <meta:contributor>
                <meta:name>Padraig Gleeson</meta:name>
            </meta:contributor>
        </status>

        <meta:notes>A-type K channel, with rate equations expressed in tau and inf form</meta:notes>

        <meta:authorList>
            <meta:modelAuthor>
                <meta:name>Maex, R.</meta:name>
            </meta:modelAuthor>
            <meta:modelAuthor>
                <meta:name>De Schutter, E.</meta:name>
            </meta:modelAuthor>
            <meta:modelTranslator>
                <meta:name>Padraig Gleeson</meta:name>
                <meta:institution>UCL</meta:institution>
                <meta:email>p.gleeson - at - ucl.ac.uk</meta:email>
            </meta:modelTranslator>
        </meta:authorList>

        <meta:publication>
           <meta:fullTitle>Maex, R and De Schutter, E.
           Synchronization of Golgi and Granule Cell Firing in a Detailed Network Model of the
           cerebellar Granule Cell Layer. J Neurophysiol, Nov 1998; 80: 2521 - 2537</meta:fullTitle>
           <meta:pubmedRef>http://www.ncbi.nlm.nih.gov/entrez/query.fcgi?cmd=Retrieve&amp;db=PubMed&amp;list_uids=9819260&amp;dopt=Abstract</meta:pubmedRef>
        </meta:publication>

        <meta:neuronDBref>
            <meta:modelName>K channels</meta:modelName>
            <meta:uri>http://senselab.med.yale.edu/senselab/NeuronDB/channelGene2.htm#table3</meta:uri>
        </meta:neuronDBref>

        <current_voltage_relation cond_law="ohmic" ion="k" default_gmax="1.14567" default_erev="-90">

            <q10_settings q10_factor="1" experimental_temp="17.350264793"/>
            <offset value="10"/>

            <gate name="m" instances="3">
                <closed_state id="m0"/>
                <open_state id="m"/>

                <time_course name="tau" from="m0" to="m" expr_form="generic" expr="0.410 * ((exp (( ((v) + 43.5) / (-42.8))))) + 0.167"/>
                <steady_state name="inf" from="m0" to="m" expr_form="sigmoid" rate="1" scale="-19.8" midpoint="-46.7"/>

            </gate>

            <gate name="h" instances="1">
                <closed_state id="h0"/>
                <open_state id="h"/>

                <time_course name="tau" from="h0" to="h" expr_form="generic" expr="10.8 + (0.03 * v) + (1 / (57.9 * (exp (v *0.127)) + (134e-6 * (exp (v * -0.059)))))"/>
                <steady_state name="inf" from="h0" to="h" expr_form="sigmoid" rate="1" scale="8.4" midpoint="-78.8"/>

            </gate>
        </current_voltage_relation>

    </channel_type>
    <channel_type name="Gran_KCa_98" xmlns="http://morphml.org/channelml/schema">

        <status value="stable">
            <meta:issue>This ChannelML file is intended ONLY to replicate the original GENESIS functionality. A new Granule cell model is being developed based on
                D'Angelo et al 2001 and Berends, Maex and De Schutter 2005, and the ChannelML files will be updated</meta:issue>
            <meta:contributor>
                <meta:name>Padraig Gleeson</meta:name>
            </meta:contributor>
        </status>

        <meta:notes>Calcium dependent K+ channel</meta:notes>

        <meta:authorList>
            <meta:modelAuthor>
                <meta:name>Maex, R.</meta:name>
            </meta:modelAuthor>
            <meta:modelAuthor>
                <meta:name>De Schutter, E.</meta:name>
            </meta:modelAuthor>
            <meta:modelTranslator>
                <meta:name>Padraig Gleeson</meta:name>
                <meta:institution>UCL</meta:institution>
                <meta:email>p.gleeson - at - ucl.ac.uk</meta:email>
            </meta:modelTranslator>
        </meta:authorList>

        <meta:publication>
           <meta:fullTitle>Maex, R and De Schutter, E.
           Synchronization of Golgi and Granule Cell Firing in a Detailed Network Model of the
           cerebellar Granule Cell Layer. J Neurophysiol, Nov 1998; 80: 2521 - 2537</meta:fullTitle>
           <meta:pubmedRef>http://www.ncbi.nlm.nih.gov/entrez/query.fcgi?cmd=Retrieve&amp;db=PubMed&amp;list_uids=9819260&amp;dopt=Abstract</meta:pubmedRef>
        </meta:publication>

        <meta:neuronDBref>
            <meta:modelName>K channels</meta:modelName>
            <meta:uri>http://senselab.med.yale.edu/senselab/NeuronDB/channelGene2.htm#table3</meta:uri>
        </meta:neuronDBref>

        <current_voltage_relation cond_law="ohmic" ion="k" default_gmax="0.179811" default_erev="-0.09">

            <conc_dependence name="Calcium" ion="ca" charge="2" variable_name="ca_conc" min_conc="7.55e-7" max_conc="0.050"/>

            <q10_settings q10_factor="3" experimental_temp="17.350264793"/>
            <offset value="0.010"/>

            <gate name="m" instances="1">
                <closed_state id="m0"/>
                <open_state id="m"/>

                <transition name="alpha" from="m0" to="m" expr_form="generic" expr="2500/(1 + ( (1.5e-3 *(exp (-85*v))) / ca_conc))"/>
                <transition name="beta" from="m" to="m0" expr_form="generic" expr="1500/(1 + (ca_conc / (1.5e-4 * (exp (-77*v)))))"/>

            </gate>
        </current_voltage_relation>

    </channel_type>
    <channel_type name="Gran_KDr_98" xmlns="http://morphml.org/channelml/schema">

        <status value="stable">
            <meta:comment>Verified equivalence of NEURON and GENESIS mapping to orig GENESIS impl from www.tnb.ua.ac.be.</meta:comment>
            <meta:comment>Updated to post v1.7.3 new ChannelML format</meta:comment>
            <meta:issue>There is a discontinuity in the expression for alpha in h gate</meta:issue>
            <meta:contributor>
                <meta:name>Padraig Gleeson</meta:name>
            </meta:contributor>
        </status>

        <meta:notes>Delayed rectifyer K channel</meta:notes>

        <meta:authorList>
            <meta:modelAuthor>
                <meta:name>Maex, R.</meta:name>
            </meta:modelAuthor>
            <meta:modelAuthor>
                <meta:name>De Schutter, E.</meta:name>
            </meta:modelAuthor>
            <meta:modelTranslator>
                <meta:name>Padraig Gleeson</meta:name>
                <meta:institution>UCL</meta:institution>
                <meta:email>p.gleeson - at - ucl.ac.uk</meta:email>
            </meta:modelTranslator>
        </meta:authorList>

        <meta:publication>
           <meta:fullTitle>Maex, R and De Schutter, E.
           Synchronization of Golgi and Granule Cell Firing in a Detailed Network Model of the
           cerebellar Granule Cell Layer. J Neurophysiol, Nov 1998; 80: 2521 - 2537</meta:fullTitle>
           <meta:pubmedRef>http://www.ncbi.nlm.nih.gov/entrez/query.fcgi?cmd=Retrieve&amp;db=PubMed&amp;list_uids=9819260&amp;dopt=Abstract</meta:pubmedRef>
        </meta:publication>

        <meta:neuronDBref>
            <meta:modelName>K channels</meta:modelName>
            <meta:uri>http://senselab.med.yale.edu/senselab/NeuronDB/channelGene2.htm#table3</meta:uri>
        </meta:neuronDBref>

        <current_voltage_relation cond_law="ohmic" ion="k" default_gmax="8.89691" default_erev="-0.09">

            <q10_settings q10_factor="3" experimental_temp="17.350264793"/>
            <offset value="0.010"/>

            <gate name="m" instances="4">
                <closed_state id="m0"/>
                <open_state id="m"/>

                <transition name="alpha" from="m0" to="m" expr_form="generic" expr="170 * ((exp (73 *(v - (-0.038)))))"/>
                <transition name="beta" from="m" to="m0" expr_form="generic" expr="170 * ((exp ((-18) *(v - (-0.038)))))"/>

            </gate>

            <gate name="h" instances="1">
                <closed_state id="h0"/>
                <open_state id="h"/>

                <transition name="alpha" from="h0" to="h" expr_form="generic" expr="v &gt; -0.046 ? 0.76 : 0.7 + 0.065*(exp (-80*(v - (-0.046))))"/>
                <transition name="beta" from="h" to="h0" expr_form="generic" expr="1.1/(1 + (exp (-80.7 * (v - (-0.044)))))"/>

            </gate>
        </current_voltage_relation>

    </channel_type>
    <channel_type name="Gran_NaF_98" xmlns="http://morphml.org/channelml/schema">

        <status value="stable">
            <meta:comment>Verified equivalence of NEURON and GENESIS mapping to orig GENESIS impl from www.tnb.ua.ac.be</meta:comment>
            <meta:comment>Updated to post v1.7.3 new ChannelML format</meta:comment>
            <meta:issue>Quite a small dt (~0.001 ms) is needed to give matching NEURON/GENESIS results for a compartment with just
                this channel (and a leak current)</meta:issue>
            <meta:contributor>
                <meta:name>Padraig Gleeson</meta:name>
            </meta:contributor>
        </status>

        <meta:notes>Fast inactivating Na+ channel</meta:notes>

        <meta:authorList>
            <meta:modelAuthor>
                <meta:name>Maex, R.</meta:name>
            </meta:modelAuthor>
            <meta:modelAuthor>
                <meta:name>De Schutter, E.</meta:name>
            </meta:modelAuthor>
            <meta:modelTranslator>
                <meta:name>Padraig Gleeson</meta:name>
                <meta:institution>UCL</meta:institution>
                <meta:email>p.gleeson - at - ucl.ac.uk</meta:email>
            </meta:modelTranslator>
        </meta:authorList>

        <meta:publication>
           <meta:fullTitle>Maex, R and De Schutter, E.
           Synchronization of Golgi and Granule Cell Firing in a Detailed Network Model of the
           cerebellar Granule Cell Layer. J Neurophysiol, Nov 1998; 80: 2521 - 2537</meta:fullTitle>
           <meta:pubmedRef>http://www.ncbi.nlm.nih.gov/entrez/query.fcgi?cmd=Retrieve&amp;db=PubMed&amp;list_uids=9819260&amp;dopt=Abstract</meta:pubmedRef>
        </meta:publication>

        <meta:neuronDBref>
            <meta:modelName>Na channels</meta:modelName>
            <meta:uri>http://senselab.med.yale.edu/senselab/NeuronDB/channelGene2.htm#table2</meta:uri>
        </meta:neuronDBref>

        <current_voltage_relation cond_law="ohmic" ion="na" default_gmax="546.301" default_erev="0.055">

            <q10_settings q10_factor="3" experimental_temp="17.350264793"/>
            <offset value="0.010"/>

            <gate name="m" instances="3">
                <closed_state id="m0"/>
                <open_state id="m"/>

                <transition name="alpha" from="m0" to="m" expr_form="exponential" rate="1500" scale="0.012345679" midpoint="-0.039"/>

                <transition name="beta" from="m" to="m0" expr_form="exponential" rate="1500" scale="-0.0151515" midpoint="-0.039"/>

                <time_course name="tau" from="m0" to="m" expr_form="generic" expr="1/(alpha + beta) &lt; 0.00005 ? 0.00005 : 1/(alpha + beta)"/>

            </gate>

            <gate name="h" instances="1">
                <closed_state id="h0"/>
                <open_state id="h"/>

                <transition name="alpha" from="h0" to="h" expr_form="exponential" rate="120" scale="-0.01123596" midpoint="-0.05"/>

                <transition name="beta" from="h" to="h0" expr_form="exponential" rate="120" scale="0.01123596" midpoint="-0.05"/>

                <time_course name="tau" from="h0" to="h" expr_form="generic" expr="1/(alpha + beta) &lt; 0.000225 ? 0.000225 : 1/(alpha + beta)"/>

            </gate>
        </current_voltage_relation>

                <!-- Adding extra table divs due to discontinuity in tau-->

        <impl_prefs>
            <table_settings max_v="0.1" min_v="-0.1" table_divisions="4000"/>
        </impl_prefs>

    </channel_type>
    <channel_type name="GranPassiveCond" xmlns="http://morphml.org/channelml/schema">

        <status value="stable">
            <meta:contributor>
                <meta:name>Padraig Gleeson</meta:name>
            </meta:contributor>
        </status>

        <meta:notes>Simple leak conductance for Granule cell</meta:notes>

        <meta:publication>
            <meta:fullTitle>Maex, R and De Schutter, E.
            Synchronization of Golgi and Granule Cell Firing in a Detailed Network Model of the
            cerebellar Granule Cell Layer. J Neurophysiol, Nov 1998; 80: 2521 - 2537</meta:fullTitle>
            <meta:pubmedRef>http://www.ncbi.nlm.nih.gov/entrez/query.fcgi?cmd=Retrieve&amp;db=PubMed&amp;list_uids=9819260&amp;dopt=Abstract</meta:pubmedRef>
        </meta:publication>

        <current_voltage_relation cond_law="ohmic" ion="non_specific" default_gmax="3.30033e-2" default_erev="-65"/>            <!-- gmax units: mS/cm2-->

    </channel_type>
    <channel_type name="K2" density="yes" xmlns="http://morphml.org/channelml/schema">

        <status value="in_progress">
            <meta:comment>Getting there...</meta:comment>
            <meta:contributor>
                <meta:name>Padraig Gleeson</meta:name>
            </meta:contributor>
        </status>

        <meta:notes>Ca2+ dependent K current (K2). Based on Roth et al's reimplementation of original GENESIS model in NEURON</meta:notes>

        <current_voltage_relation>
            <ohmic ion="k">
                <conductance default_gmax=".39">

		            <gate power="1">
                        <state name="m" fraction="1"/>
                    </gate>

                    <gate power="2">
                        <state name="z" fraction="1"/>
                    </gate>

                </conductance>
            </ohmic>
        </current_voltage_relation>

        <hh_gate state="m">
            <transition>
                <voltage_conc_gate>
                    <conc_dependence name="Calcium" ion="ca" variable_name="ca_conc_m" min_conc="0" max_conc="0.050"/>
                    <alpha>
                        <generic_equation_hh expr="25"/>
                    </alpha>
                    <beta>
                        <parameterised_hh type="exponential">
                            <parameter name="A" value="0.075"/>
                            <parameter name="k" value="-0.1666666667"/>
                            <parameter name="d" value="-25"/>
                        </parameterised_hh>
                    </beta>
                </voltage_conc_gate>
            </transition>
        </hh_gate>

        <hh_gate state="z">
            <transition>
                <voltage_conc_gate>
                    <conc_dependence name="Calcium" ion="ca" variable_name="ca_conc_z" min_conc="0" max_conc="1e-8"/>
                    <alpha>

                        <generic_equation_hh expr="0.2/( (ca_conc_z*1e6) *1000)"/>      <!-- ...ideally...  -->

                         <!--   <generic_equation_hh expr="0.2/( ( floor(((ca_conc_z*1e6) - 4e-5)/9.9986667e-5)*9.9986667e-5 + 4e-5) *1000)"/>   With fix -->

                    </alpha>
                    <beta>
                        <generic_equation_hh expr="1"/>
                    </beta>
                    <tau>
                        <generic_equation_hh expr="10"/>
                    </tau>
                    <inf>
                        <generic_equation_hh expr="1/(1 + alpha)"/>
                    </inf>
                </voltage_conc_gate>
            </transition>
        </hh_gate>

        <impl_prefs>
            <comment>Using the NEURON mod file impl settings to get a closer match</comment>
            <table_settings max_v="100" min_v="-100" table_divisions="200"/>
        </impl_prefs>

    </channel_type>
    <channel_type name="KA" density="yes" xmlns="http://morphml.org/channelml/schema">

        <status value="stable">
            <meta:comment>Verified equivalence of NEURON and GENESIS mapping to orig NEURON mod impl at 0.02ms dt with current pulse (but 0.002 is better)</meta:comment>
            <meta:comment>Needs a large value of table_divisions for equivalence with orig NEURON mod impl</meta:comment>
            <meta:contributor>
                <meta:name>Padraig Gleeson</meta:name>
            </meta:contributor>
        </status>

        <meta:notes>A type K current. Based on Roth et al's reimplementation of original GENESIS model in NEURON</meta:notes>

        <meta:authorList>
            <meta:modelAuthor>
                <meta:name>De Schutter, E.</meta:name>
            </meta:modelAuthor>
            <meta:modelAuthor>
                <meta:name>Bower, J.</meta:name>
            </meta:modelAuthor>
            <meta:modelTranslator>
                <meta:name>Padraig Gleeson</meta:name>
                <meta:institution>UCL</meta:institution>
                <meta:email>p.gleeson - at - ucl.ac.uk</meta:email>
            </meta:modelTranslator>
            <meta:modelTranslator>
                <meta:name>Jenny Davie</meta:name>
                <meta:institution>UCL</meta:institution>
                <meta:comment>Conversion of GENESIS model to NEURON</meta:comment>
            </meta:modelTranslator>
            <meta:modelTranslator>
                <meta:name>Arnd Roth</meta:name>
                <meta:institution>UCL</meta:institution>
                <meta:comment>Conversion of GENESIS model to NEURON</meta:comment>
            </meta:modelTranslator>
            <meta:modelTranslator>
                <meta:name>Volker Steuber</meta:name>
                <meta:institution>UCL</meta:institution>
                <meta:comment>Conversion of GENESIS model to NEURON</meta:comment>
            </meta:modelTranslator>
            <meta:modelTranslator>
                <meta:name>Michael Hausser</meta:name>
                <meta:institution>UCL</meta:institution>
                <meta:comment>Conversion of GENESIS model to NEURON</meta:comment>
            </meta:modelTranslator>
        </meta:authorList>

        <meta:publication>
            <meta:fullTitle>De Schutter, E., and Bower, J. M. (1994). An active membrane model of the cerebellar Purkinje cell. I. Simulation of current clamps in slice. J Neurophysiol 71, 375-400.</meta:fullTitle>
            <meta:pubmedRef>http://www.ncbi.nlm.nih.gov/entrez/query.fcgi?db=pubmed&amp;cmd=Retrieve&amp;dopt=AbstractPlus&amp;list_uids=7512629</meta:pubmedRef>
        </meta:publication>

        <meta:neuronDBref>
            <meta:modelName>K channels</meta:modelName>
            <meta:uri>http://senselab.med.yale.edu/senselab/NeuronDB/channelGene2.htm#table3</meta:uri>
        </meta:neuronDBref>

        <current_voltage_relation>
            <ohmic ion="k">
                <conductance default_gmax="15">                         <!-- phys units: mS/cm2 -->

                    <rate_adjustments>
                        <q10_settings q10_factor="3" experimental_temp="37"/>
                    </rate_adjustments>

                    <gate power="4">
                        <state name="m" fraction="1"/>
                    </gate>
                    <gate power="1">
                        <state name="h" fraction="1"/>
                    </gate>

                </conductance>
            </ohmic>
        </current_voltage_relation>

        <hh_gate state="m">
            <transition>
                <voltage_gate>
                    <alpha>
                        <parameterised_hh type="sigmoid">          <!--  A/(1 + exp(k*(v-d))) -->

                            <parameter name="A" value="1.4"/>
                            <parameter name="k" value="-0.08333333"/>
                            <parameter name="d" value="-27"/>
                        </parameterised_hh>
                    </alpha>
                    <beta>
                        <parameterised_hh type="sigmoid">          <!--  A/(1 + exp(k*(v-d))) -->

                            <parameter name="A" value="0.49"/>
                            <parameter name="k" value="0.25"/>
                            <parameter name="d" value="-30"/>
                        </parameterised_hh>
                    </beta>
                </voltage_gate>
            </transition>
        </hh_gate>

        <hh_gate state="h">
            <transition>
                <voltage_gate>
                    <alpha>
                        <parameterised_hh type="sigmoid">          <!--  A/(1 + exp(k*(v-d))) -->

                            <parameter name="A" value="0.0175"/>
                            <parameter name="k" value="0.125"/>
                            <parameter name="d" value="-50"/>
                        </parameterised_hh>
                    </alpha>
                    <beta>
                        <parameterised_hh type="sigmoid">          <!--  A/(1 + exp(k*(v-d))) -->

                            <parameter name="A" value="1.3"/>
                            <parameter name="k" value="-0.1"/>
                            <parameter name="d" value="-13"/>
                        </parameterised_hh>
                    </beta>
                </voltage_gate>
            </transition>
        </hh_gate>

        <impl_prefs>
          <comment>Settings from the original mod file</comment>
            <table_settings max_v="100" min_v="-100" table_divisions="200"/>
        </impl_prefs>

    </channel_type>
    <channel_type name="KC" density="yes" xmlns="http://morphml.org/channelml/schema">

        <status value="in_progress">
            <meta:comment>Getting there...</meta:comment>
            <meta:contributor>
                <meta:name>Padraig Gleeson</meta:name>
            </meta:contributor>
        </status>

        <meta:notes>Ca2+ dependent K current. Based on Roth et al's reimplementation of original GENESIS model in NEURON</meta:notes>

        <current_voltage_relation>
            <ohmic ion="k">
                <conductance default_gmax="80">

		            <gate power="1">
                        <state name="m" fraction="1"/>
                    </gate>

                    <gate power="2">
                        <state name="z" fraction="1"/>
                    </gate>

                </conductance>
            </ohmic>
        </current_voltage_relation>

        <hh_gate state="m">
            <transition>
                <voltage_conc_gate>
                    <conc_dependence name="Calcium" ion="ca" variable_name="ca_conc_m" min_conc="0" max_conc="0.050"/>
                    <alpha>
                        <generic_equation_hh expr="7.5"/>
                    </alpha>
                    <beta>
                        <parameterised_hh type="exponential">
                            <parameter name="A" value="0.11"/>
                            <parameter name="k" value="-0.06711409"/>
                            <parameter name="d" value="35"/>
                        </parameterised_hh>
                    </beta>
                </voltage_conc_gate>
            </transition>
        </hh_gate>

        <hh_gate state="z">
            <transition>
                <voltage_conc_gate>
                    <conc_dependence name="Calcium" ion="ca" variable_name="ca_conc_z" min_conc="0" max_conc="1e-8"/>
                    <alpha>

                        <generic_equation_hh expr="4/( (ca_conc_z*1e6) *1000)"/>      <!-- ...ideally...  -->

                         <!--   <generic_equation_hh expr="4/( ( floor(((ca_conc_z*1e6) - 4e-5)/9.9986667e-5)*9.9986667e-5 + 4e-5) *1000)"/>   With fix -->

                    </alpha>
                    <beta>
                        <generic_equation_hh expr="1"/>
                    </beta>
                    <tau>
                        <generic_equation_hh expr="10"/>
                    </tau>
                    <inf>
                        <generic_equation_hh expr="1/(1 + alpha)"/>
                    </inf>
                </voltage_conc_gate>
            </transition>
        </hh_gate>

        <impl_prefs>
            <comment>Using the NEURON mod file impl settings to get a closer match</comment>
            <table_settings max_v="100" min_v="-100" table_divisions="200"/>
        </impl_prefs>

    </channel_type>
    <channel_type name="Kdr" density="yes" xmlns="http://morphml.org/channelml/schema">

        <status value="stable">
            <meta:comment>Agreement of generated NEURON to original NEURON mod. Agreement on GENESIS when v1.7.1 XSL is used</meta:comment>
            <meta:contributor>
                <meta:name>Padraig Gleeson</meta:name>
            </meta:contributor>
        </status>

        <meta:notes>Delayed rectifier type K current. Based on Roth et al's reimplementation of original GENESIS model in NEURON</meta:notes>

        <meta:authorList>
            <meta:modelAuthor>
                <meta:name>De Schutter, E.</meta:name>
            </meta:modelAuthor>
            <meta:modelAuthor>
                <meta:name>Bower, J.</meta:name>
            </meta:modelAuthor>
            <meta:modelTranslator>
                <meta:name>Padraig Gleeson</meta:name>
                <meta:institution>UCL</meta:institution>
                <meta:email>p.gleeson - at - ucl.ac.uk</meta:email>
            </meta:modelTranslator>
            <meta:modelTranslator>
                <meta:name>Jenny Davie</meta:name>
                <meta:institution>UCL</meta:institution>
                <meta:comment>Conversion of GENESIS model to NEURON</meta:comment>
            </meta:modelTranslator>
            <meta:modelTranslator>
                <meta:name>Arnd Roth</meta:name>
                <meta:institution>UCL</meta:institution>
                <meta:comment>Conversion of GENESIS model to NEURON</meta:comment>
            </meta:modelTranslator>
            <meta:modelTranslator>
                <meta:name>Volker Steuber</meta:name>
                <meta:institution>UCL</meta:institution>
                <meta:comment>Conversion of GENESIS model to NEURON</meta:comment>
            </meta:modelTranslator>
            <meta:modelTranslator>
                <meta:name>Michael Hausser</meta:name>
                <meta:institution>UCL</meta:institution>
                <meta:comment>Conversion of GENESIS model to NEURON</meta:comment>
            </meta:modelTranslator>

        </meta:authorList>

        <meta:publication>
            <meta:fullTitle>De Schutter, E., and Bower, J. M. (1994). An active membrane model of the cerebellar Purkinje cell. I. Simulation of current clamps in slice. J Neurophysiol 71, 375-400.</meta:fullTitle>
            <meta:pubmedRef>http://www.ncbi.nlm.nih.gov/entrez/query.fcgi?db=pubmed&amp;cmd=Retrieve&amp;dopt=AbstractPlus&amp;list_uids=7512629</meta:pubmedRef>
        </meta:publication>

        <meta:neuronDBref>
            <meta:modelName>K channels</meta:modelName>
            <meta:uri>http://senselab.med.yale.edu/senselab/NeuronDB/channelGene2.htm#table3</meta:uri>
        </meta:neuronDBref>

        <current_voltage_relation>
            <ohmic ion="k">
                <conductance default_gmax="600">                 <!-- phys units: mS/cm2 -->

                    <rate_adjustments>
                        <q10_settings q10_factor="3" experimental_temp="37"/>
                    </rate_adjustments>

                    <gate power="2">
                        <state name="m" fraction="1"/>
                    </gate>
                    <gate power="1">
                        <state name="h" fraction="1"/>
                    </gate>

                </conductance>
            </ohmic>
        </current_voltage_relation>

        <hh_gate state="m">
            <transition>
                <voltage_gate>
                    <alpha>
                        <parameterised_hh type="linoid" expr="A*(k*(v-d))/(1 - exp(-(k*(v-d))))">
                            <parameter name="A" value="0.282"/>
                            <parameter name="k" value="0.08333333"/>
                            <parameter name="d" value="8"/>
                        </parameterised_hh>
                    </alpha>
                    <beta>
                        <parameterised_hh type="exponential" expr="A*exp(k*(v-d))">
                            <parameter name="A" value="5"/>
                            <parameter name="k" value="-0.0333333"/>
                            <parameter name="d" value="-127"/>
                        </parameterised_hh>
                    </beta>
                    <gamma>
                        <parameterised_hh type="linoid" expr="A*(k*(v-d))/(1 - exp(-(k*(v-d))))">
                            <parameter name="A" value="0.282"/>
                            <parameter name="k" value="0.08333333"/>
                            <parameter name="d" value="-12"/>
                        </parameterised_hh>
                    </gamma>
                    <zeta>
                        <parameterised_hh type="exponential" expr="A*exp(k*(v-d))">
                            <parameter name="A" value="5"/>
                            <parameter name="k" value="-0.0333333"/>
                            <parameter name="d" value="-147"/>
                        </parameterised_hh>
                    </zeta>
                    <tau>
                        <generic_equation_hh expr="1/(gamma + zeta)"/>
                    </tau>
                </voltage_gate>
            </transition>
        </hh_gate>

        <hh_gate state="h">
            <transition>
                <voltage_gate>
                    <tau>
                        <generic_equation_hh expr="v &lt; -25 ? 1200 : 10"/>
                    </tau>
                    <inf>
                        <parameterised_hh type="sigmoid" expr="A/(1 + exp(k*(v-d)))">
                            <parameter name="A" value="1"/>
                            <parameter name="k" value="0.25"/>
                            <parameter name="d" value="-25"/>
                        </parameterised_hh>
                    </inf>
                </voltage_gate>
            </transition>
        </hh_gate>

                    <!-- Specifying table divs to try to get as close as possible to original impl -->

		<impl_prefs>
			<comment>Note, Using the NEURON mod file impl settings to get a closer match</comment>
            <table_settings max_v="100" min_v="-100" table_divisions="200"/>
        </impl_prefs>

    </channel_type>
    <channel_type name="Kh1" density="yes" xmlns="http://morphml.org/channelml/schema">

      <status value="stable">
        <meta:comment>Verified equivalence of NEURON and GENESIS mapping to orig NEURON mod impl at 0.02ms dt with current pulse</meta:comment>
        <meta:issue>Orig NEURON impl had to be 'fixed' to include READ ek for ion, otherwise was using the internally set value of -30!</meta:issue>
        <meta:contributor>
                <meta:name>Padraig Gleeson</meta:name>
            </meta:contributor>
        </status>

        <meta:notes>Anomalous rectifier current. Based on Roth et al's reimplementation of original GENESIS model in NEURON</meta:notes>

        <meta:authorList>
            <meta:modelAuthor>
                <meta:name>De Schutter, E.</meta:name>
            </meta:modelAuthor>
            <meta:modelAuthor>
                <meta:name>Bower, J.</meta:name>
            </meta:modelAuthor>
            <meta:modelTranslator>
                <meta:name>Padraig Gleeson</meta:name>
                <meta:institution>UCL</meta:institution>
                <meta:email>p.gleeson - at - ucl.ac.uk</meta:email>
            </meta:modelTranslator>
            <meta:modelTranslator>
                <meta:name>Jenny Davie</meta:name>
                <meta:institution>UCL</meta:institution>
                <meta:comment>Conversion of GENESIS model to NEURON</meta:comment>
            </meta:modelTranslator>
            <meta:modelTranslator>
                <meta:name>Arnd Roth</meta:name>
                <meta:institution>UCL</meta:institution>
                <meta:comment>Conversion of GENESIS model to NEURON</meta:comment>
            </meta:modelTranslator>
            <meta:modelTranslator>
                <meta:name>Volker Steuber</meta:name>
                <meta:institution>UCL</meta:institution>
                <meta:comment>Conversion of GENESIS model to NEURON</meta:comment>
            </meta:modelTranslator>
            <meta:modelTranslator>
                <meta:name>Michael Hausser</meta:name>
                <meta:institution>UCL</meta:institution>
                <meta:comment>Conversion of GENESIS model to NEURON</meta:comment>
            </meta:modelTranslator>
        </meta:authorList>

        <meta:publication>
            <meta:fullTitle>De Schutter, E., and Bower, J. M. (1994). An active membrane model of the cerebellar Purkinje cell. I. Simulation of current clamps in slice. J Neurophysiol 71, 375-400.</meta:fullTitle>
            <meta:pubmedRef>http://www.ncbi.nlm.nih.gov/entrez/query.fcgi?db=pubmed&amp;cmd=Retrieve&amp;dopt=AbstractPlus&amp;list_uids=7512629</meta:pubmedRef>
        </meta:publication>

        <meta:neuronDBref>
            <meta:modelName>K channels</meta:modelName>
            <meta:uri>http://senselab.med.yale.edu/senselab/NeuronDB/channelGene2.htm#table3</meta:uri>
        </meta:neuronDBref>

        <current_voltage_relation>
            <ohmic ion="k">
                <conductance default_gmax="0.3">                 <!-- phys units: mS/cm2 -->

                    <rate_adjustments>
                        <q10_settings q10_factor="3" experimental_temp="37"/>
                    </rate_adjustments>

                    <gate power="1">
                        <state name="m" fraction="1"/>
                    </gate>

                </conductance>
            </ohmic>
        </current_voltage_relation>

        <hh_gate state="m">
            <transition>
                <voltage_gate>
                    <tau>
                        <generic_equation_hh expr="7.6"/>
                    </tau>
                    <inf>
                        <parameterised_hh type="sigmoid" expr="A/(1 + exp(k*(v-d)))">
                            <parameter name="A" value="0.8"/>
                            <parameter name="k" value="0.142857142"/>
                            <parameter name="d" value="-82"/>
                        </parameterised_hh>
                    </inf>
                </voltage_gate>
            </transition>
        </hh_gate>

        <impl_prefs>
            <comment>Note, Using the NEURON mod file impl settings to get a closer match</comment>
            <table_settings max_v="100" min_v="-100" table_divisions="200"/>
        </impl_prefs>

    </channel_type>
    <channel_type name="Kh2" density="yes" xmlns="http://morphml.org/channelml/schema">

        <status value="stable">
            <meta:comment>Verified equivalence of NEURON and GENESIS mapping to orig NEURON mod impl at 0.02ms dt with current pulse</meta:comment>
            <meta:issue>Orig NEURON impl had to be 'fixed' to include READ ek for ion, otherwise was using the internally set value of -30!</meta:issue>
            <meta:contributor>
                <meta:name>Padraig Gleeson</meta:name>
            </meta:contributor>
        </status>

        <meta:notes>Anomalous rectifier current. Based on Roth et al's reimplementation of original GENESIS model in NEURON</meta:notes>

        <meta:authorList>
            <meta:modelAuthor>
                <meta:name>De Schutter, E.</meta:name>
            </meta:modelAuthor>
            <meta:modelAuthor>
                <meta:name>Bower, J.</meta:name>
            </meta:modelAuthor>
            <meta:modelTranslator>
                <meta:name>Padraig Gleeson</meta:name>
                <meta:institution>UCL</meta:institution>
                <meta:email>p.gleeson - at - ucl.ac.uk</meta:email>
            </meta:modelTranslator>
            <meta:modelTranslator>
                <meta:name>Jenny Davie</meta:name>
                <meta:institution>UCL</meta:institution>
                <meta:comment>Conversion of GENESIS model to NEURON</meta:comment>
            </meta:modelTranslator>
            <meta:modelTranslator>
                <meta:name>Arnd Roth</meta:name>
                <meta:institution>UCL</meta:institution>
                <meta:comment>Conversion of GENESIS model to NEURON</meta:comment>
            </meta:modelTranslator>
            <meta:modelTranslator>
                <meta:name>Volker Steuber</meta:name>
                <meta:institution>UCL</meta:institution>
                <meta:comment>Conversion of GENESIS model to NEURON</meta:comment>
            </meta:modelTranslator>
            <meta:modelTranslator>
                <meta:name>Michael Hausser</meta:name>
                <meta:institution>UCL</meta:institution>
                <meta:comment>Conversion of GENESIS model to NEURON</meta:comment>
            </meta:modelTranslator>
        </meta:authorList>

        <meta:publication>
            <meta:fullTitle>De Schutter, E., and Bower, J. M. (1994). An active membrane model of the cerebellar Purkinje cell. I. Simulation of current clamps in slice. J Neurophysiol 71, 375-400.</meta:fullTitle>
            <meta:pubmedRef>http://www.ncbi.nlm.nih.gov/entrez/query.fcgi?db=pubmed&amp;cmd=Retrieve&amp;dopt=AbstractPlus&amp;list_uids=7512629</meta:pubmedRef>
        </meta:publication>

        <meta:neuronDBref>
            <meta:modelName>K channels</meta:modelName>
            <meta:uri>http://senselab.med.yale.edu/senselab/NeuronDB/channelGene2.htm#table3</meta:uri>
        </meta:neuronDBref>

        <current_voltage_relation>
            <ohmic ion="k">
                <conductance default_gmax="0.3">                 <!-- phys units: mS/cm2 -->

                    <rate_adjustments>
                        <q10_settings q10_factor="3" experimental_temp="37"/>
                    </rate_adjustments>

                    <gate power="1">
                        <state name="m" fraction="1"/>
                    </gate>

                </conductance>
            </ohmic>
        </current_voltage_relation>

        <hh_gate state="m">
            <transition>
                <voltage_gate>
                    <tau>
                        <generic_equation_hh expr="36.8"/>
                    </tau>
                    <inf>
                        <parameterised_hh type="sigmoid" expr="A/(1 + exp(k*(v-d)))">
                            <parameter name="A" value="0.2"/>
                            <parameter name="k" value="0.142857142"/>
                            <parameter name="d" value="-82"/>
                        </parameterised_hh>
                    </inf>
                </voltage_gate>
            </transition>
        </hh_gate>

        <impl_prefs>
            <comment>Note, Using the NEURON mod file impl settings to get a closer match</comment>
            <table_settings max_v="100" min_v="-100" table_divisions="200"/>
        </impl_prefs>

    </channel_type>
    <channel_type name="KMnew2" density="yes" xmlns="http://morphml.org/channelml/schema">

        <status value="stable">
            <meta:comment>Verified equivalence of NEURON and GENESIS mapping to orig NEURON mod impl at 0.02ms dt with current pulse (but 0.002 is better)</meta:comment>
          <meta:contributor>
              <meta:name>Padraig Gleeson</meta:name>
          </meta:contributor>
        </status>

        <meta:notes>Persistent potassium current. Based on Roth et al's reimplementation of original GENESIS model in NEURON</meta:notes>

        <meta:authorList>
            <meta:modelAuthor>
                <meta:name>De Schutter, E.</meta:name>
            </meta:modelAuthor>
            <meta:modelAuthor>
                <meta:name>Bower, J.</meta:name>
            </meta:modelAuthor>
            <meta:modelTranslator>
                <meta:name>Padraig Gleeson</meta:name>
                <meta:institution>UCL</meta:institution>
                <meta:email>p.gleeson - at - ucl.ac.uk</meta:email>
            </meta:modelTranslator>
            <meta:modelTranslator>
                <meta:name>Jenny Davie</meta:name>
                <meta:institution>UCL</meta:institution>
                <meta:comment>Conversion of GENESIS model to NEURON</meta:comment>
            </meta:modelTranslator>
            <meta:modelTranslator>
                <meta:name>Arnd Roth</meta:name>
                <meta:institution>UCL</meta:institution>
                <meta:comment>Conversion of GENESIS model to NEURON</meta:comment>
            </meta:modelTranslator>
            <meta:modelTranslator>
                <meta:name>Volker Steuber</meta:name>
                <meta:institution>UCL</meta:institution>
                <meta:comment>Conversion of GENESIS model to NEURON</meta:comment>
            </meta:modelTranslator>
            <meta:modelTranslator>
                <meta:name>Michael Hausser</meta:name>
                <meta:institution>UCL</meta:institution>
                <meta:comment>Conversion of GENESIS model to NEURON</meta:comment>
            </meta:modelTranslator>
        </meta:authorList>

        <meta:publication>
            <meta:fullTitle>De Schutter, E., and Bower, J. M. (1994). An active membrane model of the cerebellar Purkinje cell. I. Simulation of current clamps in slice. J Neurophysiol 71, 375-400.</meta:fullTitle>
            <meta:pubmedRef>http://www.ncbi.nlm.nih.gov/entrez/query.fcgi?db=pubmed&amp;cmd=Retrieve&amp;dopt=AbstractPlus&amp;list_uids=7512629</meta:pubmedRef>
        </meta:publication>

        <meta:neuronDBref>
            <meta:modelName>K channels</meta:modelName>
            <meta:uri>http://senselab.med.yale.edu/senselab/NeuronDB/channelGene2.htm#table3</meta:uri>
        </meta:neuronDBref>

        <current_voltage_relation>
            <ohmic ion="k">
                <conductance default_gmax="0.04">                 <!-- phys units: mS/cm2 -->

                    <rate_adjustments>
                        <q10_settings q10_factor="3" experimental_temp="37"/>
                    </rate_adjustments>

                    <gate power="1">
                        <state name="m" fraction="1"/>
                    </gate>

                </conductance>
            </ohmic>
        </current_voltage_relation>

        <hh_gate state="m">
            <transition>
                <voltage_gate>
                    <tau>
                        <meta:notes>This equation seems to be questionable according to comments in the mod file conversion...
                                Note also the space between the exp and bracket, and the liberal use of brackets,
                                needed to make sure GENESIS is happy with the equation </meta:notes>

                        <generic_equation_hh expr="200 / (   (3.3 * (exp ((v + 35)/20)  ))   + (exp ((v+35)/(-20)))     )"/>
                    </tau>
                    <inf>
                        <parameterised_hh type="sigmoid" expr="A/(1 + exp(k*(v-d)))">
                            <parameter name="A" value="1"/>
                            <parameter name="k" value="-0.1"/>
                            <parameter name="d" value="-35"/>
                        </parameterised_hh>
                    </inf>
                </voltage_gate>
            </transition>
        </hh_gate>

        <impl_prefs>
            <table_settings max_v="50" min_v="-100" table_divisions="200"/>
        </impl_prefs>

    </channel_type>
    <channel_type name="Leak" density="yes" xmlns="http://morphml.org/channelml/schema">

        <status value="stable"/>

        <meta:notes>Simple example of a leak/passive conductance. Note: for GENESIS cells with a single leak conductance,
        it is better to use the Rm and Em variables for a passive current.</meta:notes>

        <current_voltage_relation>
            <ohmic ion="non_specific">
                <conductance default_gmax="0.3"/>           <!-- phys units: mS/cm2-->

            </ohmic>
        </current_voltage_relation>

    </channel_type>
    <channel_type name="LeakConductance" density="yes" xmlns="http://morphml.org/channelml/schema">

        <status value="stable"/>

        <meta:notes>Simple example of a leak/passive conductance. Note: for GENESIS cells with a single leak conductance,
        it is better to use the Rm and Em variables for a passive current.</meta:notes>

        <current_voltage_relation>
            <ohmic ion="non_specific">
                <conductance default_gmax="0.3"/>               <!-- phys units: mS/cm2-->

            </ohmic>
        </current_voltage_relation>

    </channel_type>
    <channel_type name="MFFastLeakCond" density="yes" xmlns="http://morphml.org/channelml/schema">

        <status value="stable">
            <meta:contributor>
                <meta:name>Padraig Gleeson</meta:name>
            </meta:contributor>
        </status>

        <meta:notes>Simple example of a leak/passive conductance. Note: for GENESIS cells with a single leak conductance,
        it is better to use the Rm and Em variables for a passive current.</meta:notes>

        <current_voltage_relation>
            <ohmic ion="non_specific">
                <conductance default_gmax="0.3"/>           <!-- phys units: mS/cm2-->

            </ohmic>
        </current_voltage_relation>

    </channel_type>
    <channel_type name="NaF" density="yes" xmlns="http://morphml.org/channelml/schema">

        <status value="stable">
            <meta:comment>Verified equivalence of NEURON and GENESIS mapping to orig NEURON mod impl at 0.02ms dt with current pulse (but 0.002ms is better)</meta:comment>
            <meta:issue>Orig NEURON impl had to be 'fixed' to include READ ena for ion, otherwise was using the internally set value of 45</meta:issue>
            <meta:contributor>
                <meta:name>Padraig Gleeson</meta:name>
            </meta:contributor>
        </status>

        <meta:notes>Fast sodium channel. Based on Roth et al's reimplementation of original GENESIS model in NEURON</meta:notes>

        <meta:authorList>
            <meta:modelAuthor>
                <meta:name>De Schutter, E.</meta:name>
            </meta:modelAuthor>
            <meta:modelAuthor>
                <meta:name>Bower, J.</meta:name>
            </meta:modelAuthor>
            <meta:modelTranslator>
                <meta:name>Padraig Gleeson</meta:name>
                <meta:institution>UCL</meta:institution>
                <meta:email>p.gleeson - at - ucl.ac.uk</meta:email>
            </meta:modelTranslator>
            <meta:modelTranslator>
                <meta:name>Jenny Davie</meta:name>
                <meta:institution>UCL</meta:institution>
                <meta:comment>Conversion of GENESIS model to NEURON</meta:comment>
            </meta:modelTranslator>
            <meta:modelTranslator>
                <meta:name>Arnd Roth</meta:name>
                <meta:institution>UCL</meta:institution>
                <meta:comment>Conversion of GENESIS model to NEURON</meta:comment>
            </meta:modelTranslator>
            <meta:modelTranslator>
                <meta:name>Volker Steuber</meta:name>
                <meta:institution>UCL</meta:institution>
                <meta:comment>Conversion of GENESIS model to NEURON</meta:comment>
            </meta:modelTranslator>
            <meta:modelTranslator>
                <meta:name>Michael Hausser</meta:name>
                <meta:institution>UCL</meta:institution>
                <meta:comment>Conversion of GENESIS model to NEURON</meta:comment>
            </meta:modelTranslator>
        </meta:authorList>

        <meta:publication>
            <meta:fullTitle>De Schutter, E., and Bower, J. M. (1994). An active membrane model of the cerebellar Purkinje cell. I. Simulation of current clamps in slice. J Neurophysiol 71, 375-400.</meta:fullTitle>
            <meta:pubmedRef>http://www.ncbi.nlm.nih.gov/entrez/query.fcgi?db=pubmed&amp;cmd=Retrieve&amp;dopt=AbstractPlus&amp;list_uids=7512629</meta:pubmedRef>
        </meta:publication>

        <meta:neuronDBref>
            <meta:modelName>Na channels</meta:modelName>
            <meta:uri>http://senselab.med.yale.edu/senselab/NeuronDB/channelGene2.htm#table2</meta:uri>
        </meta:neuronDBref>

        <current_voltage_relation>
            <ohmic ion="na">
                <conductance default_gmax="7500">             <!-- phys units: mS/cm2 -->

                    <rate_adjustments>
                        <q10_settings q10_factor="3" experimental_temp="37"/>
                    </rate_adjustments>

                    <gate power="3">
                        <state name="m" fraction="1"/>
                    </gate>
                    <gate power="1">
                        <state name="h" fraction="1"/>
                    </gate>

                </conductance>
            </ohmic>
        </current_voltage_relation>

        <hh_gate state="m">
            <transition>
                <voltage_gate>
                    <alpha>
                        <parameterised_hh type="exponential" expr="A*exp(k*(v-d))">
                            <parameter name="A" value="35"/>
                            <parameter name="k" value="0.1"/>
                            <parameter name="d" value="-5"/>
                        </parameterised_hh>
                    </alpha>
                    <beta>
                        <parameterised_hh type="exponential" expr="A*exp(k*(v-d))">
                            <parameter name="A" value="7"/>
                            <parameter name="k" value="-0.05"/>
                            <parameter name="d" value="-65"/>
                        </parameterised_hh>
                    </beta>
                </voltage_gate>
            </transition>
        </hh_gate>

        <hh_gate state="h">
            <transition>
                <voltage_gate>
                    <alpha>
                        <parameterised_hh type="sigmoid" expr="A/(1 + exp(k*(v-d)))">
                            <parameter name="A" value="0.225"/>
                            <parameter name="k" value="0.1"/>
                            <parameter name="d" value="-80"/>
                        </parameterised_hh>
                    </alpha>
                    <beta>
                        <parameterised_hh type="exponential" expr="A*exp(k*(v-d))">
                            <parameter name="A" value="7.5"/>
                            <parameter name="k" value="0.0555556"/>
                            <parameter name="d" value="3"/>
                        </parameterised_hh>
                    </beta>
                </voltage_gate>
            </transition>
        </hh_gate>

        <impl_prefs>
            <table_settings max_v="100" min_v="-100" table_divisions="200"/>
        </impl_prefs>

    </channel_type>
    <channel_type name="NaP" density="yes" xmlns="http://morphml.org/channelml/schema">

        <status value="stable">
            <meta:comment>Verified equivalence of NEURON and GENESIS mapping to orig NEURON mod impl at 0.02ms dt with current pulse (but 0.002ms is better)</meta:comment>
            <meta:issue>Orig NEURON impl had to be 'fixed' to include READ ena for ion, otherwise was using the internally set value of 45</meta:issue>
            <meta:contributor>
                <meta:name>Padraig Gleeson</meta:name>
            </meta:contributor>
        </status>

        <meta:notes>Persistent Na current. Based on Roth et al's reimplementation of original GENESIS model in NEURON</meta:notes>

        <meta:authorList>
            <meta:modelAuthor>
                <meta:name>De Schutter, E.</meta:name>
            </meta:modelAuthor>
            <meta:modelAuthor>
                <meta:name>Bower, J.</meta:name>
            </meta:modelAuthor>
            <meta:modelTranslator>
                <meta:name>Padraig Gleeson</meta:name>
                <meta:institution>UCL</meta:institution>
                <meta:email>p.gleeson - at - ucl.ac.uk</meta:email>
            </meta:modelTranslator>
            <meta:modelTranslator>
                <meta:name>Jenny Davie</meta:name>
                <meta:institution>UCL</meta:institution>
                <meta:comment>Conversion of GENESIS model to NEURON</meta:comment>
            </meta:modelTranslator>
            <meta:modelTranslator>
                <meta:name>Arnd Roth</meta:name>
                <meta:institution>UCL</meta:institution>
                <meta:comment>Conversion of GENESIS model to NEURON</meta:comment>
            </meta:modelTranslator>
            <meta:modelTranslator>
                <meta:name>Volker Steuber</meta:name>
                <meta:institution>UCL</meta:institution>
                <meta:comment>Conversion of GENESIS model to NEURON</meta:comment>
            </meta:modelTranslator>
            <meta:modelTranslator>
                <meta:name>Michael Hausser</meta:name>
                <meta:institution>UCL</meta:institution>
                <meta:comment>Conversion of GENESIS model to NEURON</meta:comment>
            </meta:modelTranslator>
        </meta:authorList>

        <meta:publication>
            <meta:fullTitle>De Schutter, E., and Bower, J. M. (1994). An active membrane model of the cerebellar Purkinje cell. I. Simulation of current clamps in slice. J Neurophysiol 71, 375-400.</meta:fullTitle>
            <meta:pubmedRef>http://www.ncbi.nlm.nih.gov/entrez/query.fcgi?db=pubmed&amp;cmd=Retrieve&amp;dopt=AbstractPlus&amp;list_uids=7512629</meta:pubmedRef>
        </meta:publication>

        <meta:neuronDBref>
            <meta:modelName>Na channels</meta:modelName>
            <meta:uri>http://senselab.med.yale.edu/senselab/NeuronDB/channelGene2.htm#table2</meta:uri>
        </meta:neuronDBref>

        <current_voltage_relation>
            <ohmic ion="na">
                <conductance default_gmax="1">             <!-- phys units: mS/cm2 -->

                    <rate_adjustments>
                        <q10_settings q10_factor="3" experimental_temp="37"/>
                    </rate_adjustments>

                    <gate power="3">
                        <state name="m" fraction="1"/>
                    </gate>

                </conductance>
            </ohmic>
        </current_voltage_relation>

        <hh_gate state="m">
            <transition>
                <voltage_gate>
                    <alpha>
                        <parameterised_hh type="sigmoid" expr="A/(1 + exp(k*(v-d)))">
                            <parameter name="A" value="200"/>
                            <parameter name="k" value="-0.0625"/>
                            <parameter name="d" value="18"/>
                        </parameterised_hh>
                    </alpha>
                    <beta>
                        <parameterised_hh type="sigmoid" expr="A/(1 + exp(k*(v-d)))">
                            <parameter name="A" value="25"/>
                            <parameter name="k" value="0.125"/>
                            <parameter name="d" value="-58"/>
                        </parameterised_hh>
                    </beta>
                </voltage_gate>
            </transition>
        </hh_gate>

        <impl_prefs>
            <comment>Note, Using larger table_divisions.</comment>
            <table_settings max_v="100" min_v="-100" table_divisions="200"/>
        </impl_prefs>

    </channel_type>
    <synapse_type name="AMPA_GranGol" xmlns="http://morphml.org/channelml/schema">

        <status value="stable">
            <meta:contributor>
                <meta:name>Padraig Gleeson</meta:name>
            </meta:contributor>
        </status>

        <meta:notes>AMPA synaptic mechanism from Granule cells to Golgi cells</meta:notes>

        <meta:authorList>
            <meta:modelAuthor>
                <meta:name>Maex, R.</meta:name>
            </meta:modelAuthor>
            <meta:modelAuthor>
                <meta:name>De Schutter, E.</meta:name>
            </meta:modelAuthor>
            <meta:modelTranslator>
                <meta:name>Padraig Gleeson</meta:name>
                <meta:institution>UCL</meta:institution>
                <meta:email>p.gleeson - at - ucl.ac.uk</meta:email>
            </meta:modelTranslator>
        </meta:authorList>

        <meta:publication>
           <meta:fullTitle>Maex, R and De Schutter, E.
           Synchronization of Golgi and Granule Cell Firing in a Detailed Network Model of the
           cerebellar Granule Cell Layer. J Neurophysiol, Nov 1998; 80: 2521 - 2537</meta:fullTitle>
           <meta:pubmedRef>http://www.ncbi.nlm.nih.gov/entrez/query.fcgi?cmd=Retrieve&amp;db=PubMed&amp;list_uids=9819260&amp;dopt=Abstract</meta:pubmedRef>
        </meta:publication>

        <meta:neuronDBref>
        <meta:modelName>Receptor properties</meta:modelName>
            <meta:uri>http://senselab.med.yale.edu/senselab/NeuronDB/receptors2.asp</meta:uri>
        </meta:neuronDBref>

        <doub_exp_syn max_conductance="1.137355E-6" rise_time="0.03" decay_time="0.5" reversal_potential="0"/>

    </synapse_type>
    <synapse_type name="MF_AMPA" xmlns="http://morphml.org/channelml/schema">

        <status value="stable">
            <meta:contributor>
                <meta:name>Padraig Gleeson</meta:name>
            </meta:contributor>
        </status>

        <meta:notes>Mossy fiber to Granule Cell AMPA synapse</meta:notes>

      <meta:publication>
        <meta:fullTitle>Maex, R and De Schutter, E.
          Synchronization of Golgi and Granule Cell Firing in a Detailed Network Model of the
          cerebellar Granule Cell Layer. J Neurophysiol, Nov 1998; 80: 2521 - 2537</meta:fullTitle>
        <meta:pubmedRef>http://www.ncbi.nlm.nih.gov/entrez/query.fcgi?cmd=Retrieve&amp;db=PubMed&amp;list_uids=9819260&amp;dopt=Abstract</meta:pubmedRef>
        </meta:publication>

        <meta:neuronDBref>
        <meta:modelName>Receptor properties</meta:modelName>
            <meta:uri>http://senselab.med.yale.edu/senselab/NeuronDB/receptors2.asp</meta:uri>
        </meta:neuronDBref>

        <doub_exp_syn max_conductance="1.1238527E-7" rise_time="0.03" decay_time="0.5" reversal_potential="0"/>

    </synapse_type>
    <synapse_type name="MFSpikeSyn" xmlns="http://morphml.org/channelml/schema">

        <status value="stable">
            <meta:contributor>
                <meta:name>Padraig Gleeson</meta:name>
            </meta:contributor>
        </status>

        <meta:notes>Fast spiking synapse, used for input to Mossy Fibers</meta:notes>

        <doub_exp_syn max_conductance="1.0E-4" rise_time=".24" decay_time=".26" reversal_potential="40"/>

    </synapse_type>
    <synapse_type name="NMDA" xmlns="http://morphml.org/channelml/schema">

        <status value="stable">
            <meta:contributor>
                <meta:name>Padraig Gleeson</meta:name>
            </meta:contributor>
        </status>

        <meta:notes>Example of an NMDA receptor synaptic mechanism, based on Maex DeSchutter 1998, Gabbiani et al, 1994</meta:notes>

        <meta:publication>
            <meta:fullTitle>Gabbiani F, Midtgaard J, Knopfel T. Synaptic integration in a model of cerebellar granule cells.</meta:fullTitle>
            <meta:pubmedRef>http://www.ncbi.nlm.nih.gov/entrez/query.fcgi?db=pubmed&amp;cmd=Retrieve&amp;dopt=AbstractPlus&amp;list_uids=7527078</meta:pubmedRef>
        </meta:publication>

        <meta:publication>
            <meta:fullTitle>Maex, R and De Schutter, E.
            Synchronization of Golgi and Granule Cell Firing in a Detailed Network Model of the
            cerebellar Granule Cell Layer. J Neurophysiol, Nov 1998; 80: 2521 - 2537</meta:fullTitle>
            <meta:pubmedRef>http://www.ncbi.nlm.nih.gov/entrez/query.fcgi?cmd=Retrieve&amp;db=PubMed&amp;list_uids=9819260&amp;dopt=Abstract</meta:pubmedRef>
        </meta:publication>

        <meta:neuronDBref>
        <meta:modelName>Receptor properties</meta:modelName>
            <meta:uri>http://senselab.med.yale.edu/senselab/NeuronDB/receptors2.asp</meta:uri>
        </meta:neuronDBref>

        <blocking_syn max_conductance="1.873087796e-10" rise_time="1e-3" decay_time="13.3333e-3" reversal_potential="0">
            <block species="mg" conc="1.2" eta="0.5206857564" gamma="62"/>
        </blocking_syn>

    </synapse_type>
    <ion_concentration name="cad" xmlns="http://morphml.org/channelml/schema">

        <status value="in_progress">
            <meta:comment>Due to different num integration method in orig mod a dt of 0.002 is needed for very close agreement</meta:comment>
            <meta:contributor>
                <meta:name>Padraig Gleeson</meta:name>
            </meta:contributor>
        </status>

        <meta:notes>An expontially decaying pool of calcium</meta:notes>

        <meta:authorList>
            <meta:modelAuthor>
                <meta:name>De Schutter, E.</meta:name>
            </meta:modelAuthor>
            <meta:modelAuthor>
                <meta:name>Bower, J.</meta:name>
            </meta:modelAuthor>
            <meta:modelTranslator>
                <meta:name>Padraig Gleeson</meta:name>
                <meta:institution>UCL</meta:institution>
                <meta:email>p.gleeson - at - ucl.ac.uk</meta:email>
            </meta:modelTranslator>
            <meta:modelTranslator>
                <meta:name>Jenny Davie</meta:name>
                <meta:institution>UCL</meta:institution>
                <meta:comment>Conversion of GENESIS model to NEURON</meta:comment>
            </meta:modelTranslator>
            <meta:modelTranslator>
                <meta:name>Arnd Roth</meta:name>
                <meta:institution>UCL</meta:institution>
                <meta:comment>Conversion of GENESIS model to NEURON</meta:comment>
            </meta:modelTranslator>
            <meta:modelTranslator>
                <meta:name>Volker Steuber</meta:name>
                <meta:institution>UCL</meta:institution>
                <meta:comment>Conversion of GENESIS model to NEURON</meta:comment>
            </meta:modelTranslator>
            <meta:modelTranslator>
                <meta:name>Michael Hausser</meta:name>
                <meta:institution>UCL</meta:institution>
                <meta:comment>Conversion of GENESIS model to NEURON</meta:comment>
            </meta:modelTranslator>

        </meta:authorList>

        <meta:publication>
            <meta:fullTitle>De Schutter, E., and Bower, J. M. (1994). An active membrane model of the cerebellar Purkinje cell. I. Simulation of current clamps in slice. J Neurophysiol 71, 375-400.</meta:fullTitle>
            <meta:pubmedRef>http://www.ncbi.nlm.nih.gov/entrez/query.fcgi?db=pubmed&amp;cmd=Retrieve&amp;dopt=AbstractPlus&amp;list_uids=7512629</meta:pubmedRef>
        </meta:publication>

        <ion_species>ca</ion_species>

        <decaying_pool_model>
            <resting_conc>4e-5</resting_conc>
            <decay_constant>1e-4</decay_constant>

            <fixed_pool_info>
                <phi>0.259083466</phi>      <!-- Fixed factor, rate of change of conc is Ca current *density* times this...
                                             Units: mA-1 cm2-->

            </fixed_pool_info>

        </decaying_pool_model>

    </ion_concentration>
    <ion_concentration name="Gran_CaPool_98" xmlns="http://morphml.org/channelml/schema">

        <status value="stable">
            <meta:contributor>
                <meta:name>Padraig Gleeson</meta:name>
            </meta:contributor>
        </status>

        <meta:notes>An expontially decaying pool of calcium</meta:notes>

        <meta:publication>
           <meta:fullTitle>Maex, R and De Schutter, E.
           Synchronization of Golgi and Granule Cell Firing in a Detailed Network Model of the
           cerebellar Granule Cell Layer. J Neurophysiol, Nov 1998; 80: 2521 - 2537</meta:fullTitle>
           <meta:pubmedRef>http://www.ncbi.nlm.nih.gov/entrez/query.fcgi?cmd=Retrieve&amp;db=PubMed&amp;list_uids=9819260&amp;dopt=Abstract</meta:pubmedRef>
        </meta:publication>

        <ion_species>ca</ion_species>

        <decaying_pool_model>
            <resting_conc>7.55e-5</resting_conc>
            <decay_constant>1e-2</decay_constant>

            <pool_volume_info>
                <shell_thickness>8.4e-8</shell_thickness>
            </pool_volume_info>

        </decaying_pool_model>

    </ion_concentration>
</channels>

<populations xmlns="http://morphml.org/networkml/schema">
    <population name="MF_3D" cell_type="MossyFiberBig">
        <instances size="150">
            <instance id="0" node_id="0">
                <location x="-33.719925" y="-169.79063" z="14.672485"/>
            </instance>
            <instance id="1" node_id="1">
                <location x="-77.169205" y="-162.04413" z="78.630554"/>
            </instance>
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        </instances>
    </population>
    <population name="Purkinjes" cell_type="purk2">
        <instances size="4">
            <instance id="0" node_id="0">
                <location x="37.61862" y="19.803185" z="-37.48462"/>
            </instance>
            <instance id="1" node_id="1">
                <location x="-41.617126" y="18.266201" z="-134.24358"/>
            </instance>
            <instance id="2" node_id="2">
                <location x="-234.05426" y="19.51872" z="42.171936"/>
            </instance>
            <instance id="3" node_id="3">
                <location x="-100.85153" y="24.989117" z="-181.65923"/>
            </instance>
        </instances>
    </population>
    <population name="Golgis_detailed" cell_type="Golgi_040408_C1_v2">
        <instances size="4">
            <instance id="0" node_id="4">
                <location x="190.57193" y="-157.19824" z="227.00769"/>
            </instance>
            <instance id="1" node_id="5">
                <location x="198.14746" y="-34.05803" z="207.07996"/>
            </instance>
            <instance id="2" node_id="6">
                <location x="154.1088" y="-74.66168" z="-10.471725"/>
            </instance>
            <instance id="3" node_id="7">
                <location x="-144.64616" y="-150.93076" z="2.7695007"/>
            </instance>
        </instances>
    </population>
    <population name="GrC_3D" cell_type="Granule2">
        <instances size="100">
            <instance id="0" node_id="6">
                <location x="67.60397" y="-174.7675" z="195.90732"/>
            </instance>
            <instance id="1" node_id="7">
                <location x="-149.05212" y="-70.29573" z="69.6293"/>
            </instance>
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        </instances>
    </population>
</populations>

<projections units="Physiological Units" xmlns="http://morphml.org/networkml/schema">
    <projection name="NetConn_GrC_3D_Golgis_detailed" source="GrC_3D" target="Golgis_detailed">
        <synapse_props synapse_type="AMPA_GranGol" internal_delay="1.0" weight="0.6" threshold="-20.0">
        </synapse_props>
        <connections>
            <connection id="0" pre_cell_id="76" pre_segment_id="3" pre_fraction_along="0.8611788" post_cell_id="0" post_segment_id="4037" post_fraction_along="0.5197523">
                <properties prop_delay="0.0" internal_delay="1.0" weight="0.6869466"/>
            </connection>
            <connection id="1" pre_cell_id="34" pre_segment_id="3" pre_fraction_along="0.63277847" post_cell_id="0" post_segment_id="4288" post_fraction_along="0.8755244">
                <properties prop_delay="0.0" internal_delay="1.0" weight="0.5938284"/>
            </connection>
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        </connections>
    </projection>
    <projection name="NetConn_GrC_3D_Purkinjes" source="GrC_3D" target="Purkinjes">
        <synapse_props synapse_type="AMPA_GranGol" internal_delay="1.0" weight="1.0" threshold="-20.0">
        </synapse_props>
        <connections>
            <connection id="0" pre_cell_id="83" pre_segment_id="2" pre_fraction_along="0.16683744" post_cell_id="0" post_segment_id="394" post_fraction_along="0.67731804">
            </connection>
            <connection id="1" pre_cell_id="26" pre_segment_id="3" pre_fraction_along="0.3133136" post_cell_id="0" post_segment_id="1395" post_fraction_along="0.98769534">
            </connection>
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        </connections>
    </projection>
    <projection name="NetConnMFGrC" source="MF_3D" target="GrC_3D">
        <synapse_props synapse_type="MF_AMPA" internal_delay="1.0" weight="6.0" threshold="-20.0">
        </synapse_props>
        <synapse_props synapse_type="NMDA" internal_delay="1.0" weight="4.0" threshold="-20.0">
        </synapse_props>
        <connections>
            <connection id="0" pre_cell_id="139" post_cell_id="0">
                <properties synapse_type="MF_AMPA" prop_delay="0.0" internal_delay="1.0" weight="6.248729"/>
                <properties synapse_type="NMDA" prop_delay="0.0" internal_delay="1.0" weight="3.4125435"/>
            </connection>
            <connection id="1" pre_cell_id="124" post_cell_id="0">
                <properties synapse_type="MF_AMPA" prop_delay="0.0" internal_delay="1.0" weight="5.744763"/>
                <properties synapse_type="NMDA" prop_delay="0.0" internal_delay="1.0" weight="4.460545"/>
            </connection>
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        </connections>
    </projection>
    <projection name="NetConn_Purkinjes_Grans" source="Purkinjes" target="Golgis_detailed">
        <synapse_props synapse_type="AMPA_GranGol" internal_delay="5.0" weight="1.0" threshold="-20.0">
        </synapse_props>
        <connections>
            <connection id="0" pre_cell_id="0" pre_segment_id="776" pre_fraction_along="0.90149593" post_cell_id="2" post_segment_id="4625" post_fraction_along="0.097164765">
            </connection>
            <connection id="1" pre_cell_id="1" pre_segment_id="370" pre_fraction_along="0.839158" post_cell_id="2" post_segment_id="4464" post_fraction_along="0.60928315">
            </connection>
            <connection id="2" pre_cell_id="2" pre_segment_id="816" pre_fraction_along="0.30302244" post_cell_id="0" post_segment_id="4338" post_fraction_along="0.7912009">
            </connection>
            <connection id="3" pre_cell_id="3" pre_segment_id="1463" pre_fraction_along="0.1967403" post_cell_id="3" post_segment_id="3477" post_fraction_along="0.22217564">
            </connection>
        </connections>
    </projection>
</projections>

<inputs units="Physiological Units" xmlns="http://morphml.org/networkml/schema">
    <input name="Input_4">
        <random_stim frequency="0.05" synaptic_mechanism="MFSpikeSyn"/>
        <target population="MF_3D">
            <sites size="150">
                <site cell_id="0" segment_id="0" fraction_along="0.5"/>
                <site cell_id="1" segment_id="0" fraction_along="0.5"/>
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            </sites>
        </target>
    </input>
</inputs>

</neuroml>
