<?xml version="1.0" encoding="UTF-8"?>
<neuroml xmlns="http://www.neuroml.org/schema/neuroml2" xmlns:xsi="http://www.w3.org/2001/XMLSchema-instance" xsi:schemaLocation="http://www.neuroml.org/schema/neuroml2  https://raw.githubusercontent.com/NeuroML/NeuroML2/development/Schemas/NeuroML2/NeuroML_v2beta4.xsd" id="network_Ex6_CerebellumDemo">

    <notes>

Network structure (NeuroML 2beta4) for project: Ex6_CerebellumDemo saved with neuroConstruct v1.7.1 on: 09:29:26, 01-May-15

Cell Group: PurkinjeCells contains 4 cells
Cell Group: GranuleCells contains 80 cells
Cell Group: MossyFibers contains 12 cells

Network connection: NetConn_2 contains 41 individual synaptic connections
Network connection: NetConn_1 contains 317 individual synaptic connections

    </notes>

    <include href="GranPurkSyn.synapse.nml"/>
    <include href="GranuleCell.cell.nml"/>
    <include href="KConductance.channel.nml"/>
    <include href="MFGranSyn.synapse.nml"/>
    <include href="MossyFiber.cell.nml"/>
    <include href="NaConductance.channel.nml"/>
    <include href="PassiveCond.channel.nml"/>
    <include href="PurkinjeCell.cell.nml"/>
    <network id="network_Ex6_CerebellumDemo" type="networkWithTemperature" temperature="25.0 degC">

        <population id="PurkinjeCells" component="PurkinjeCell" type="populationList" size="4">
            <instance id="0">
                <location x="148.45262" y="179.22656" z="38.17363"/>
            </instance>
            <instance id="1">
                <location x="55.833603" y="173.80669" z="152.60602"/>
            </instance>
            <instance id="2">
                <location x="166.13208" y="181.39835" z="62.650036"/>
            </instance>
            <instance id="3">
                <location x="20.313585" y="166.82744" z="48.306465"/>
            </instance>
        </population>

        <population id="GranuleCells" component="GranuleCell" type="populationList" size="80">
            <instance id="0">
                <location x="10.32921" y="136.94153" z="159.107"/>
            </instance>
            <instance id="1">
                <location x="85.87719" y="143.96298" z="128.08649"/>
            </instance>
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        </population>

        <population id="MossyFibers" component="MossyFiber" type="populationList" size="12">
            <instance id="0">
                <location x="161.76912" y="113.61949" z="144.45248"/>
            </instance>
            <instance id="1">
                <location x="74.18119" y="120.33829" z="86.33463"/>
            </instance>
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        </population>

        <projection id="NetConn_2" presynapticPopulation="GranuleCells" postsynapticPopulation="PurkinjeCells" synapse="GranPurkSyn">
            <connection id="0" preCellId="../GranuleCells/1/GranuleCell" postCellId="../PurkinjeCells/2/PurkinjeCell" preSegmentId="16" preFractionAlong="0.67372435" postSegmentId="38" postFractionAlong="0.6453814"/>
            <connection id="1" preCellId="../GranuleCells/2/GranuleCell" postCellId="../PurkinjeCells/1/PurkinjeCell" preSegmentId="13" preFractionAlong="0.32974702" postSegmentId="30" postFractionAlong="0.27193847"/>
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        </projection>

        <projection id="NetConn_1" presynapticPopulation="MossyFibers" postsynapticPopulation="GranuleCells" synapse="MFGranSyn">
            <connection id="0" preCellId="../MossyFibers/6/MossyFiber" postCellId="../GranuleCells/0/GranuleCell" preSegmentId="0" preFractionAlong="0.07697219" postSegmentId="0" postFractionAlong="0.5"/>
            <connection id="1" preCellId="../MossyFibers/7/MossyFiber" postCellId="../GranuleCells/0/GranuleCell" preSegmentId="0" preFractionAlong="0.050432563" postSegmentId="0" postFractionAlong="0.5"/>
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        </projection>

            <!--There are no electrical inputs present in the network-->

    </network>

</neuroml>
